## Прогноз долей по данным за 1 год
## Среднеквадратичная ошибка
findPrognoz(ax, ay, az, x, y, z, n, returnString) :=
    x[0] ← x
    y[0] ← y
    z[0] ← z
    for i ∈ 0 .. n - 2
        x[i + 1] ← x[i] + x[i]*(ax[0] + ax[1]*x[i] + ax[2]*y[i] + ax[3]*z[i])
        y[i + 1] ← y[i] + y[i]*(ay[0] + ay[1]*x[i] + ay[2]*y[i] + ay[3]*z[i])
        z[i + 1] ← z[i] + z[i]*(az[0] + az[1]*x[i] + az[2]*y[i] + az[3]*z[i])
    return ← x if returnString == "x"
    return ← y if returnString == "y"
    return ← z if returnString == "z"
    return
sqError(x1, y1, z1, x2, y2, z2, n) :=
    for i ∈ 0 .. n - 1
        x[i] ← (x1[i] - x2[i])^2
        y[i] ← (y1[i] - y2[i])^2
        z[i] ← (z1[i] - z2[i])^2
    sumx ← 0
    sumy ← 0
    sumz ← 0
    for i ∈ 0 .. n - 1
        sumx ← sumx + x[i]
        sumy ← sumy + y[i]
        sumz ← sumz + z[i]
    return[0] ← sumx/18
    return[1] ← sumy/18
    return[2] ← sumz/18
    return
## Прогноз долей по данным за каждый  год
findProgOnReal(ax, ay, az, x, y, z, n, returnString) :=
    if returnString == "x"
        for i ∈ 0 .. n - 2
            X[i] ← x[i] + x[i]*(ax[0] + ax[1]*x[i] + ax[2]*y[i] + ax[3]*z[i])
        return ← X
    if returnString == "y"
        for i ∈ 0 .. n - 2
            Y[i] ← y[i] + y[i]*(ay[0] + ay[1]*x[i] + ay[2]*y[i] + ay[3]*z[i])
        return ← Y
    if returnString == "z"
        for i ∈ 0 .. n - 2
            Z[i] ← z[i] + z[i]*(az[0] + az[1]*x[i] + az[2]*y[i] + az[3]*z[i])
        return ← Z
    return
## Нахождение коэфицентов интегральным методом
findCIM(x, y, z, n, xString, yString, zString) :=
    for i ∈ 0 .. n - 2
        X[i, 0] ← (x[i + 1] + x[i])/2
    for i ∈ 0 .. n - 2
        X[i, 2] ← (x[i + 1]*y[i + 1] + (x[i]*y[i]))/2
    for i ∈ 0 .. n - 2
        X[i, 1] ← (x[i + 1]^2 + x[i]^2)/2
    for i ∈ 0 .. n - 2
        X[i, 3] ← (x[i + 1]*z[i + 1] + (x[i]*z[i]))/2
    for i ∈ 0 .. n - 2
        dx[i] ← x[i + 1] - x[i]
    ans ← (transpose(X)*X)^-1*transpose(X)*dx
    copyAns ← ans
    if (xString == "y") and (yString == "x") and (zString == "z")
        ans[1] ← copyAns[2]
        ans[2] ← copyAns[1]
    if (xString == "z") and (yString == "x") and (zString == "y")
        ans[1] ← copyAns[2]
        ans[2] ← copyAns[3]
        ans[3] ← copyAns[1]
    ans
## Доля выручки
n := 15
z := [0.6989; 0.5627; 0.4266; 0.3524; 0.2782; 0.2120; 0.1458; 0.1233; 0.1008; 0.1033; 0.1058; 0.0813; 0.0568; 0.0341; 0.0115]
array := [1; 2; 3; 4; 5; 6; 7; 8; 9; 10; 11; 12; 13; 14; 15]
x := [0.0783; 0.2913; 0.5043; 0.6008; 0.6973; 0.7593; 0.8213; 0.8337; 0.8461; 0.8614; 0.8767; 0.8932; 0.9097; 0.9442; 0.9788]
y := [0.2228; 0.1459; 0.0690; 0.0467; 0.0245; 0.0286; 0.0328; 0.0429; 0.0530; 0.0353; 0.0175; 0.0255; 0.0335; 0.0216; 0.0097]
## Нахождение коэфицентов интегральным методом
ax := findCIM(x, y, z, n, "x", "y", "z")
ay := findCIM(y, x, z, n, "y", "x", "z")
az := findCIM(z, x, y, n, "z", "x", "y")
ax = [-473.304; 473.209; 476.547; 473.705]
ay = [-835.996; 836.051; 840.544; 833.989]
az = [-510.338; 510.156; 510.326; 510.083]
matrix_XX(ax, ay, az) :=
    for i ∈ 0 .. 3
        XX[0, i] ← ax[i]
        XX[1, i] ← ay[i]
        XX[2, i] ← az[i]
    XX
XX := matrix_XX(ax, ay, az)
XX = [
    -473.304, 473.209, 476.547, 473.705;
    -835.996, 836.051, 840.544, 833.989;
    -510.338, 510.156, 510.326, 510.083
]
## Прогноз долей по данным за каждый  год
yI := findPrognoz(ax, ay, az, x[0], y[0], z[0], 5, "y")
zI := findPrognoz(ax, ay, az, x[0], y[0], z[0], 5, "z")
xI := findPrognoz(ax, ay, az, x[0], y[0], z[0], 5, "x")
doliI :=
    temp[:, 0] ← xI
    temp[:, 1] ← yI
    temp[:, 2] ← zI
    temp
doliI = [
    0.0783, 0.2228, 0.6989;
    0, 0, 0;
    0, 0, -40.8811;
    338201, 941796, 1432162;
    4.35356e14, 2.13673e15, 1.98165e15
]  # ошибка на 3 году
## Среднеквадратичная ошибка
sqError(xI, yI, zI, x, y, z, 2) = [0.0010136; 4.46831e-6; 2.58835e-9]
## Прогноз долей по данным на 1 год
xIR := findProgOnReal(ax, ay, az, x, y, z, n, "x")
yIR := findProgOnReal(ax, ay, az, x, y, z, n, "y")
zIR := findProgOnReal(ax, ay, az, x, y, z, n, "z")
doliIR :=
    temp[:, 0] ← xIR
    temp[:, 1] ← yIR
    temp[:, 2] ← zIR
    temp
# подсчет интегральным методом
doliIR = [
    0.156227, 0.136932, 0.562916;
    0.472966, 0.0680511, 0.422697;
    0.655292, 0.0277138, 0.319082;
    0.713843, 0.0212251, 0.264139;
    0.784151, 0.0144894, 0.22316;
    0.803393, 0.0189546, 0.160407;
    0.85353, 0.0268353, 0.111121;
    0.885217, 0.0390358, 0.0943857;
    0.917463, 0.0530903, 0.0774996;
    0.924989, 0.0353225, 0.0843617;
    0.890415, 0.0160215, 0.0860637;
    0.920167, 0.0255506, 0.066389;
    0.950399, 0.0364632, 0.0465607;
    0.893621, 0.0215612, 0.0262002
]
## Среднеквадратичная ошибка
sqError(xIR, yIR, zIR, x, y, z, 7) = [0.00473213; 0.000889787; 0.00357426]
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## Прогнозируем
xI := findPrognoz(ax, ay, az, x[7], y[7], z[7], 2, "x")
yI := findPrognoz(ax, ay, az, x[7], y[7], z[7], 2, "y")
zI := findPrognoz(ax, ay, az, x[7], y[7], z[7], 2, "z")
newIZ := z
newIX := x
newIY := y
xI = [0.8337; 0.885217]
zI = [0.1233; 0.0943857]
yI = [0.0429; 0.0390358]
newIX[10] := xI[0]
newIY[10] := yI[0]
newIZ[10] := zI[0]
newIX[11] := xI[1]
newIY[11] := yI[1]
newIZ[11] := zI[1]
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