## Прогноз долей по данным за 1 год
## Среднеквадратичная ошибка
findPrognoz(ax, ay, az, x, y, z, n, returnString) :=
    x[0] ← x
    y[0] ← y
    z[0] ← z
    for i ∈ 0 .. n - 2
        x[i + 1] ← x[i] + x[i]*(ax[0] + ax[1]*x[i] + ax[2]*y[i] + ax[3]*z[i])
        y[i + 1] ← y[i] + y[i]*(ay[0] + ay[1]*x[i] + ay[2]*y[i] + ay[3]*z[i])
        z[i + 1] ← z[i] + z[i]*(az[0] + az[1]*x[i] + az[2]*y[i] + az[3]*z[i])
    return ← x if returnString == "x"
    return ← y if returnString == "y"
    return ← z if returnString == "z"
    return
sqError(x1, y1, z1, x2, y2, z2, n) :=
    for i ∈ 0 .. n - 1
        x[i] ← (x1[i] - x2[i])^2
        y[i] ← (y1[i] - y2[i])^2
        z[i] ← (z1[i] - z2[i])^2
    sumx ← 0
    sumy ← 0
    sumz ← 0
    for i ∈ 0 .. n - 1
        sumx ← sumx + x[i]
        sumy ← sumy + y[i]
        sumz ← sumz + z[i]
    return[0] ← sumx/18
    return[1] ← sumy/18
    return[2] ← sumz/18
    return
## Прогноз долей по данным за каждый  год
findProgOnReal(ax, ay, az, x, y, z, n, returnString) :=
    if returnString == "x"
        for i ∈ 0 .. n - 2
            X[i] ← x[i] + x[i]*(ax[0] + ax[1]*x[i] + ax[2]*y[i] + ax[3]*z[i])
        return ← X
    if returnString == "y"
        for i ∈ 0 .. n - 2
            Y[i] ← y[i] + y[i]*(ay[0] + ay[1]*x[i] + ay[2]*y[i] + ay[3]*z[i])
        return ← Y
    if returnString == "z"
        for i ∈ 0 .. n - 2
            Z[i] ← z[i] + z[i]*(az[0] + az[1]*x[i] + az[2]*y[i] + az[3]*z[i])
        return ← Z
    return
## Нахождение коэфицентов интегральным методом
## Нахождение коэфицентов логарифмическим интегральным методом
findCIM(x, y, z, n, xString, yString, zString) :=
    for i ∈ 0 .. n - 2
        X[i, 0] ← (x[i + 1] + x[i])/2
    for i ∈ 0 .. n - 2
        X[i, 2] ← (x[i + 1]*y[i + 1] + (x[i]*y[i]))/2
    for i ∈ 0 .. n - 2
        X[i, 1] ← (x[i + 1]^2 + x[i]^2)/2
    for i ∈ 0 .. n - 2
        X[i, 3] ← (x[i + 1]*z[i + 1] + (x[i]*z[i]))/2
    for i ∈ 0 .. n - 2
        dx[i] ← x[i + 1] - x[i]
    ans ← (transpose(X)*X)^-1*transpose(X)*dx
    copyAns ← ans
    if (xString == "y") and (yString == "x") and (zString == "z")
        ans[1] ← copyAns[2]
        ans[2] ← copyAns[1]
    if (xString == "z") and (yString == "x") and (zString == "y")
        ans[1] ← copyAns[2]
        ans[2] ← copyAns[3]
        ans[3] ← copyAns[1]
    ans
findLIM(x, y, z, n, xString, yString, zString) :=
    for i ∈ 0 .. n - 2
        X[i, 0] ← 1
    for i ∈ 0 .. n - 2
        X[i, 1] ← (x[i + 1] + x[i])/2
    for i ∈ 0 .. n - 2
        X[i, 2] ← (y[i + 1] + y[i])/2
    for i ∈ 0 .. n - 2
        X[i, 3] ← (z[i + 1] + z[i])/2
    for i ∈ 0 .. n - 2
        lx[i] ← ln(x[i + 1]) - ln(x[i])
    ans ← (transpose(X)*X)^-1*transpose(X)*lx
    copyAns ← ans
    if (xString == "y") and (yString == "x") and (zString == "z")
        ans[1] ← copyAns[2]
        ans[2] ← copyAns[1]
    if (xString == "z") and (yString == "x") and (zString == "y")
        ans[1] ← copyAns[2]
        ans[2] ← copyAns[3]
        ans[3] ← copyAns[1]
    ans
# Доля выручки
array := [1; 2; 3; 4; 5; 6; 7; 8]
n := 8
x := [0.0783; 0.5043; 0.6973; 0.8213; 0.8461; 0.8767; 0.9097; 0.9788]
y := [0.2228; 0.0690; 0.0245; 0.0328; 0.0530; 0.0175; 0.0335; 0.0097]
z := [0.6989; 0.4266; 0.2782; 0.1458; 0.1008; 0.1058; 0.0568; 0.0115]
## Нахождение коэфицентов интегральным методом
## Нахождение коэфицентов логарифмическим интегральным методом
axIntegral := findCIM(x, y, z, n, "x", "y", "z")
axLog := findLIM(x, y, z, n, "x", "y", "z")
ayLog := findLIM(y, x, z, n, "y", "x", "z")
ayIntegral := findCIM(y, x, z, n, "y", "x", "z")
azIntegral := findCIM(z, x, y, n, "z", "x", "y")
azLog := findLIM(z, x, y, n, "z", "x", "y")
axIntegral = [-3860.34; 3859.95; 3876.95; 3860.76]
ayIntegral = [2477.07; -2477.18; -2473.91; -2479.72]
azIntegral = [4247.33; -4247.96; -4246.6; -4248.37]
axLog = [-3224.99; 3224.69; 3238.15; 3225.3]
ayLog = [7478.04; -7478.34; -7483.71; -7479.28]
azLog = [8416.71; -8417.71; -8419.02; -8417.16]
## Прогноз долей по данным за 1 год
## Прогноз долей по данным за 1 год
xIR := findProgOnReal(axIntegral, ayIntegral, azIntegral, x, y, z, n, "x")
xLR := findProgOnReal(axLog, ayLog, azLog, x, y, z, n, "x")
yIR := findProgOnReal(axIntegral, ayIntegral, azIntegral, x, y, z, n, "y")
yLR := findProgOnReal(axLog, ayLog, azLog, x, y, z, n, "y")
zIR := findProgOnReal(axIntegral, ayIntegral, azIntegral, x, y, z, n, "z")
zLR := findProgOnReal(axLog, ayLog, azLog, x, y, z, n, "z")
doliIR :=
    temp[:, 0] ← xIR
    temp[:, 1] ← yIR
    temp[:, 2] ← zIR
    temp
doliLR :=
    temp[:, 0] ← xLR
    temp[:, 1] ← yLR
    temp[:, 2] ← zLR
    temp
doliIR = [
    0.388202, -0.0361336, 0.27484;
    0.875872, 0.0188477, 0.307907;
    0.86902, 0.00627936, 0.0828469;
    0.734584, 0.028438, 0.114946;
    1.0166, 0.0555033, 0.084097;
    0.866132, 0.0117374, 0.0380168;
    1.1102, 0.0283858, 0.022788
]
doliLR = [
    0.323102, -0.25709, 0.0667978;
    0.791506, 0.0464285, 0.421614;
    0.839223, 0.00740299, 0.0341884;
    0.749882, 0.037031, 0.128418;
    0.979672, 0.0563193, 0.0836174;
    0.881477, 0.00875941, 0.00390995;
    1.08375, 0.0154245, -0.00062468
]
## Среднеквадратичная ошибка
## Среднеквадратичная ошибка
sqError(xIR, yIR, zIR, x, y, z, 7) = [0.0189164; 0.0038877; 0.0132811]
sqError(xLR, yLR, zLR, x, y, z, 7) = [0.0119897; 0.0128627; 0.0262998]
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## Прогнозируем
## Прогнозируем
xL := findPrognoz(axLog, ayLog, azLog, x[10], y[10], z[10], 2, "x")
xI := findPrognoz(axIntegral, ayIntegral, azIntegral, x[10], y[10], z[10], 2, "x")
yI := findPrognoz(axIntegral, ayIntegral, azIntegral, x[10], y[10], z[10], 2, "y")
yL := findPrognoz(axLog, ayLog, azLog, x[10], y[10], z[10], 2, "y")
zI := findPrognoz(axIntegral, ayIntegral, azIntegral, x[10], y[10], z[10], 2, "z")
zL := findPrognoz(axLog, ayLog, azLog, x[10], y[10], z[10], 2, "z")
newRX := x
newRY := y
newRZ := z
newIX := x
newIY := y
newIZ := z
xL =  # error: Эта переменная не определена.
yL =  # error
zL =  # error
xI =  # error
yI =  # error
zI =  # error
newRX[10] := xI[0]
newRY[10] := yI[0]
newRZ[10] := zI[0]
newIX[10] := xI[0]
newIY[10] := yI[0]
newIZ[10] := zI[0]
newRX[11] := xI[1]
newRY[11] := yI[1]
newRZ[11] := zI[1]
newIX[11] := xI[1]
newIY[11] := yI[1]
newIZ[11] := zI[1]
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