X := [0.0783; 0.5043; 0.6973; 0.8213; 0.8461; 0.8767; 0.9097; 0.9788]
Y := [0.2228; 0.0690; 0.0245; 0.0328; 0.0530; 0.0175; 0.0335; 0.0097]
Z := [0.6989; 0.4266; 0.2782; 0.1458; 0.1008; 0.1058; 0.0568; 0.0115]
t := [0; 0.142857; 0.285714; 0.428571; 0.571429; 0.714286; 0.857143; 1]
ORIGIN := 0
TOL := 10^-6
ax := line(X, t) = [-0.240924; 1.03762]
ay := line(Y, t) = [0.70516; -3.54642]
fx(x) := ax[0] + ax[1]*x
fy(y) := ay[0] + ay[1]*y
az := line(Z, t) = [0.811461; -1.36576]
fz(z) := az[0] + az[1]*z
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x(0) == 0.47
y(0) == 0.245
z(0) == 0.285
