n := 8
x := [0.0783; 0.5043; 0.6973; 0.8213; 0.8461; 0.8767; 0.9097; 0.9788]
y := [0.2228; 0.0690; 0.0245; 0.0328; 0.0530; 0.0175; 0.0335; 0.0097]
z := [0.6989; 0.4266; 0.2782; 0.1458; 0.1008; 0.1058; 0.0568; 0.0115]
d(x) :=
    for i ∈ 0 .. n - 2
        d[i] ← (x[i + 1] + x[i])/2
    d
# Интегральный метод подсчета коэффициентов
intcoefY(y) :=
    for i ∈ 0 .. n - 2
        Y[i, 0] ← (y[i + 1] + y[i])/2
    for i ∈ 0 .. n - 2
        Y[i, 2] ← (y[i + 1]^2 + y[i]^2)/2
    for i ∈ 0 .. n - 2
        Y[i, 1] ← ((x[i + 1]*y[i + 1]) + (x[i]*y[i]))/2
    for i ∈ 0 .. n - 2
        Y[i, 3] ← (y[i + 1]*z[i + 1] + (y[i]*z[i]))/2
    Y
intcoefZ(z) :=
    for i ∈ 0 .. n - 2
        Z[i, 0] ← (z[i + 1] + z[i])/2
    for i ∈ 0 .. n - 2
        Z[i, 3] ← (z[i + 1]^2 + z[i]^2)/2
    for i ∈ 0 .. n - 2
        Z[i, 1] ← ((x[i + 1]*z[i + 1]) + (x[i]*z[i]))/2
    for i ∈ 0 .. n - 2
        Z[i, 2] ← (y[i + 1]*z[i + 1] + (y[i]*z[i]))/2
    Z
intcoefX(x) :=
    for i ∈ 0 .. n - 2
        X[i, 0] ← (x[i + 1] + x[i])/2
    for i ∈ 0 .. n - 2
        X[i, 1] ← (x[i + 1]^2 + (x[i]^2))/2
    for i ∈ 0 .. n - 2
        X[i, 2] ← ((x[i + 1]*y[i + 1]) + (x[i]*y[i]))/2
    for i ∈ 0 .. n - 2
        X[i, 3] ← (x[i + 1]*z[i + 1] + (x[i]*z[i]))/2
    X
X := intcoefX(x)
dx := d(x)
Y := intcoefY(y)
dy := d(y)
Z := intcoefZ(z)
dz := d(z)
# скрин с моей работы
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a := (transpose(X)*X)^-1*transpose(X)*dx = [1; 3.91125e-7; 3.65773e-7; 2.2972e-7]
b := (transpose(Y)*Y)^-1*transpose(Y)*dy = [1; 4.07884e-7; -1.444e-7; 4.22415e-9]
c := (transpose(Z)*Z)^-1*transpose(Z)*dz = [0.999999; 6.2767e-7; 2.48901e-7; 2.84547e-8]
