# соотношение компаний, где: x - ЯНДЕКС.ТАКСИ
#
# y - СИТИ-МОБИЛ
#
# z - Gett
x := [0.0783; 0.5043; 0.6973; 0.8213; 0.8461; 0.8767; 0.9097; 0.9788]
y := [0.2228; 0.0690; 0.0245; 0.0328; 0.0530; 0.0175; 0.0335; 0.0097]
z := [0.6989; 0.4266; 0.2782; 0.1458; 0.1008; 0.1058; 0.0568; 0.0115]
n := 8
matrix_X(x, y, z, n) :=
    for t ∈ 0 .. n - 2
        X[t, 0] ← (x[t + 1] + x[t])/2
    for t ∈ 0 .. n - 2
        X[t, 1] ← (x[t + 1]^2 + x[t]^2)/2
    for t ∈ 0 .. n - 2
        X[t, 2] ← (x[t + 1]*y[t + 1] + x[t]*y[t])/2
    for t ∈ 0 .. n - 2
        X[t, 3] ← (x[t + 1]*z[t + 1] + x[t]*z[t])/2
    X
X := matrix_X(x, y, z, n)
X = [
    0.2913, 0.130225, 0.026121, 0.134929;
    0.6008, 0.370273, 0.0259403, 0.204562;
    0.7593, 0.58038, 0.0220112, 0.156867;
    0.8337, 0.695209, 0.035891, 0.102516;
    0.8614, 0.742244, 0.0300928, 0.0890209;
    0.8932, 0.798078, 0.0229086, 0.0722129;
    0.94425, 0.892802, 0.0199847, 0.0314636
]
# матрица X
# Цикл для заполнения матрицы X
D(x, n) :=
    for t ∈ 0 .. n - 2
        d[t] ← x[t + 1] - x[t]
    d
# D(x, n) - цикл для подсчета изменения
# доли рынка на основе исходных данных
dx := D(x, n)
ax := (transpose(X)*X)^-1*transpose(X)*dx = [-3860.34; 3859.95; 3876.95; 3860.76]
# таблица коэффициентов a0,a1,a2,a3
# для компании x
dy := D(y, n)
ay := (transpose(X)*X)^-1*transpose(X)*dy = [1869.94; -1869.74; -1878.78; -1869.73]
# таблица коэффициентов a0,a1,a2,a3
# для компании y
dz := D(z, n)
az := (transpose(X)*X)^-1*transpose(X)*dz = [1990.28; -1990.08; -1998.05; -1990.9]
# таблица коэффициентов a0,a1,a2,a3
# для компании z
int_d(a, x, y, z) :=
    for t ∈ 0 .. n - 2
        int_d[t] ← x[t]*(a[0] + a[1]*x[t] + a[2]*y[t] + a[3]*z[t])
    int_d
# int_d(a, x, y, z) - цикл для подсчета
# изменения доли рынка в год
# интегральным методом
int_dx := int_d(ax, x, y, z)
dx = [0.426; 0.193; 0.124; 0.0248; 0.0306; 0.033; 0.0691]
int_dx = [0.309902; 0.371572; 0.17172; -0.0867162; 0.170503; -0.0105682; 0.200499]
# int_dx - изменения доли рынка x в год посчитанные при помощи интегрального метода
# dx - изменения x в год по исходным данным
int_dy := int_d(ay, x, y, z)
int_dy = [-0.141224; -0.116516; -0.0126058; 0.075627; -0.0770131; 0.037495; -0.093198]
dy = [-0.1538; -0.0445; 0.0083; 0.0202; -0.0355; 0.016; -0.0238]
# int_dy - изменения доли рынка y в год посчитанные при помощи интегрального метода
# dx - изменения y в год по исходным данным
int_dz := int_d(az, x, y, z)
dz = [-0.2723; -0.1484; -0.1324; -0.045; 0.005; -0.049; -0.0453]
int_dz = [-0.168683; -0.255072; -0.159115; 0.0110897; -0.0934864; -0.0269109; -0.107281]
# int_dy - изменения доли рынка z в год посчитанные при помощи интегрального метода
# dx - изменения z в год по исходным данным
matrix_XX(ax, ay, az) :=
    for i ∈ 0 .. 3
        XX[i, 0] ← ax[i]
        XX[i, 1] ← ay[i]
        XX[i, 2] ← az[i]
    XX
XX := matrix_XX(ax, ay, az)
XX = [
    -3860.34, 1869.94, 1990.28;
    3859.95, -1869.74, -1990.08;
    3876.95, -1878.78, -1998.05;
    3860.76, -1869.73, -1990.9
]
