## Прогноз долей по данным за 1 год
## Среднеквадратичная ошибка
findPrognoz(ax, ay, az, x, y, z, n, returnString) :=
    x[0] ← x
    y[0] ← y
    z[0] ← z
    for i ∈ 0 .. n - 2
        x[i + 1] ← x[i] + x[i]*(ax[0] + ax[1]*x[i] + ax[2]*y[i] + ax[3]*z[i])
        y[i + 1] ← y[i] + y[i]*(ay[0] + ay[1]*x[i] + ay[2]*y[i] + ay[3]*z[i])
        z[i + 1] ← z[i] + z[i]*(az[0] + az[1]*x[i] + az[2]*y[i] + az[3]*z[i])
    return ← x if returnString == "x"
    return ← y if returnString == "y"
    return ← z if returnString == "z"
    return
sqError(x1, y1, z1, x2, y2, z2, n) :=
    for i ∈ 0 .. n - 1
        x[i] ← (x1[i] - x2[i])^2
        y[i] ← (y1[i] - y2[i])^2
        z[i] ← (z1[i] - z2[i])^2
    sumx ← 0
    sumy ← 0
    sumz ← 0
    for i ∈ 0 .. n - 1
        sumx ← sumx + x[i]
        sumy ← sumy + y[i]
        sumz ← sumz + z[i]
    return[0] ← sumx/18
    return[1] ← sumy/18
    return[2] ← sumz/18
    return
## Прогноз долей по данным за каждый  год
findProgOnReal(ax, ay, az, x, y, z, n, returnString) :=
    if returnString == "x"
        for i ∈ 0 .. n - 2
            X[i] ← x[i] + x[i]*(ax[0] + ax[1]*x[i] + ax[2]*y[i] + ax[3]*z[i])
        return ← X
    if returnString == "y"
        for i ∈ 0 .. n - 2
            Y[i] ← y[i] + y[i]*(ay[0] + ay[1]*x[i] + ay[2]*y[i] + ay[3]*z[i])
        return ← Y
    if returnString == "z"
        for i ∈ 0 .. n - 2
            Z[i] ← z[i] + z[i]*(az[0] + az[1]*x[i] + az[2]*y[i] + az[3]*z[i])
        return ← Z
    return
## Нахождение коэфицентов интегральным методом
findCIM(x, y, z, n, xString, yString, zString) :=
    for i ∈ 0 .. n - 2
        X[i, 0] ← (x[i + 1] + x[i])/2
    for i ∈ 0 .. n - 2
        X[i, 2] ← (x[i + 1]*y[i + 1] + (x[i]*y[i]))/2
    for i ∈ 0 .. n - 2
        X[i, 1] ← (x[i + 1]^2 + x[i]^2)/2
    for i ∈ 0 .. n - 2
        X[i, 3] ← (x[i + 1]*z[i + 1] + (x[i]*z[i]))/2
    for i ∈ 0 .. n - 2
        dx[i] ← x[i + 1] - x[i]
    ans ← (transpose(X)*X)^-1*transpose(X)*dx
    copyAns ← ans
    if (xString == "y") and (yString == "x") and (zString == "z")
        ans[1] ← copyAns[2]
        ans[2] ← copyAns[1]
    if (xString == "z") and (yString == "x") and (zString == "y")
        ans[1] ← copyAns[2]
        ans[2] ← copyAns[3]
        ans[3] ← copyAns[1]
    ans
## Доля выручки
n := 19
x := [0.52; 0.47; 0.43; 0.4; 0.38; 0.37; 0.36; 0.36; 0.35; 0.36; 0.37; 0.38; 0.39; 0.38; 0.37; 0.38; 0.38; 0.36; 0.34]
y := [0.15; 0.21; 0.27; 0.31; 0.35; 0.36; 0.37; 0.37; 0.38; 0.38; 0.39; 0.39; 0.39; 0.39; 0.39; 0.39; 0.4; 0.39; 0.38]
z := [0.33; 0.32; 0.3; 0.29; 0.28; 0.27; 0.27; 0.27; 0.27; 0.25; 0.24; 0.23; 0.22; 0.23; 0.24; 0.23; 0.22; 0.25; 0.28]
array := [1; 2; 3; 4; 5; 6; 7; 8; 9; 10; 11; 12; 13; 14; 15; 16; 17; 18; 19]
## Нахождение коэфицентов интегральным методом
ax := findCIM(x, y, z, n, "x", "y", "z")
ay := findCIM(y, x, z, n, "y", "x", "z")
az := findCIM(z, x, y, n, "z", "x", "y")
ax = [4.14924; -4.21356; -3.86539; -4.53204]
ay = [0.990184; -0.0359754; -2.04096; -0.762096]
az = [-2.68117; 2.52234; 2.85762; 2.63919]
# Тут потом сделать анализ динамической модели
matrix_XX(ax, ay, az) :=
    for i ∈ 0 .. 3
        XX[0, i] ← ax[i]
        XX[1, i] ← ay[i]
        XX[2, i] ← az[i]
    XX
XX := matrix_XX(ax, ay, az)
XX = [
    4.14924, -4.21356, -3.86539, -4.53204;
    0.990184, -0.0359754, -2.04096, -0.762096;
    -2.68117, 2.52234, 2.85762, 2.63919
]
Q := [-4.213564, -3.865391, -4.532039; -0.035975, -2.040956, -0.762096; 2.52234, 2.857623, 2.639192]
## Прогноз долей по данным на 8 лет
-4.214*x - 3.865*y - 4.532*z
xI := findPrognoz(ax, ay, az, x[18], y[18], z[18], 8, "x")
|Q| = -2.28163  # устойчивый узел
-0.036*x - 0.036*y - 0.762*z
yI := findPrognoz(ax, ay, az, x[18], y[18], z[18], 8, "y")
2.522*x + 2.858*y + 2.639*z
# λ1= -0,613
zI := findPrognoz(ax, az, az, x[18], y[18], z[18], 8, "z")  # λ2 = 1,501+i*(1,212)
# λ3 = -1,501-i*(1,212)
doliI :=
    temp[:, 0] ← xI
    temp[:, 1] ← yI
    temp[:, 2] ← zI
    temp
# Большая ошибка на 3 году
doliI = [
    0.34, 0.38, 0.28;
    0.332796, 0.375821, 0.280362;
    0.340676, 0.374887, 0.276292;
    0.350723, 0.376796, 0.266257;
    0.35718, 0.379557, 0.247607;
    0.360044, 0.381867, 0.218111;
    0.361604, 0.383462, 0.17999;
    0.36317, 0.384616, 0.143702
]
## Среднеквадратичная ошибка
sqError(xI, yI, zI, x, y, z, 7) = [0.00345857; 0.00541069; 0.000946701]
## Тест Прогноза долей по данным начиная с  1 года
xIR := findProgOnReal(ax, ay, az, x, y, z, n, "x")
yIR := findProgOnReal(az, ay, az, x, y, z, n, "y")
zIR := findProgOnReal(az, ay, az, x, y, z, n, "z")
doliIR :=
    temp[:, 0] ← xIR
    temp[:, 1] ← yIR
    temp[:, 2] ← zIR
    temp
doliIR = [
    0.459061, 0.212076, 0.306907;
    0.426235, 0.273169, 0.30367;
    0.401682, 0.322658, 0.290025;
    0.380502, 0.347848, 0.283908;
    0.351968, 0.367077, 0.284608;
    0.360762, 0.373091, 0.268223;
    0.352265, 0.376036, 0.269128;
    0.352265, 0.376036, 0.269128;
    0.343699, 0.37858, 0.270034;
    0.370981, 0.384235, 0.243141;
    0.368162, 0.389219, 0.239993;
    0.379323, 0.392051, 0.229725;
    0.390547, 0.394883, 0.21948;
    0.379323, 0.392051, 0.229725;
    0.368162, 0.389219, 0.239993;
    0.379323, 0.392051, 0.229725;
    0.381856, 0.396988, 0.220217;
    0.357065, 0.386387, 0.250285
]
## Среднеквадратичная ошибка
sqError(xIR, yIR, zIR, x, y, z, 7) = [0.000430112; 0.000697138; 5.34294e-5]
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## Прогнозируем
xI := findPrognoz(ax, ay, az, x[18], y[18], z[18], 2, "x")
yI := findPrognoz(ax, ay, az, x[18], y[18], z[18], 2, "y")
zI := findPrognoz(ax, ay, az, x[18], y[18], z[18], 2, "z")
newIX := x
newIY := y
newIZ := z
xI = [0.34; 0.332796]
yI = [0.38; 0.375821]
zI = [0.28; 0.280362]
newIX[10] := xI[0]
newIY[10] := yI[0]
newIZ[10] := zI[0]
newIX[11] := xI[1]
newIY[11] := yI[1]
newIZ[11] := zI[1]
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