## Прогноз долей
## Среднеквадратичная ошибка
findPrognoz(ax, ay, az, x, y, z, n, returnString) :=
    x[0] ← x
    y[0] ← y
    z[0] ← z
    for i ∈ 0 .. n - 2
        x[i + 1] ← x[i] + x[i]*(ax[0] + ax[1]*x[i] + ax[2]*y[i] + ax[3]*z[i])
        y[i + 1] ← y[i] + y[i]*(ay[0] + ay[1]*x[i] + ay[2]*y[i] + ay[3]*z[i])
        z[i + 1] ← z[i] + z[i]*(az[0] + az[1]*x[i] + az[2]*y[i] + az[3]*z[i])
    return ← x if returnString == "x"
    return ← y if returnString == "y"
    return ← z if returnString == "z"
    return
sqError(x1, y1, z1, x2, y2, z2, n) :=
    for i ∈ 0 .. n - 1
        x[i] ← (x1[i] - x2[i])^2
        y[i] ← (y1[i] - y2[i])^2
        z[i] ← (z1[i] - z2[i])^2
    sumx ← 0
    sumy ← 0
    sumz ← 0
    for i ∈ 0 .. n - 1
        sumx ← sumx + x[i]
        sumy ← sumy + y[i]
        sumz ← sumz + z[i]
    return[0] ← sumx/18
    return[1] ← sumy/18
    return[2] ← sumz/18
    return
## Прогноз долей по данным за каждый  год
findProgOnReal(ax, ay, az, x, y, z, n, returnString) :=
    if returnString == "x"
        for i ∈ 0 .. n - 2
            X[i] ← x[i] + x[i]*(ax[0] + ax[1]*x[i] + ax[2]*y[i] + ax[3]*z[i])
        return ← X
    if returnString == "y"
        for i ∈ 0 .. n - 2
            Y[i] ← y[i] + y[i]*(ay[0] + ay[1]*x[i] + ay[2]*y[i] + ay[3]*z[i])
        return ← Y
    if returnString == "z"
        for i ∈ 0 .. n - 2
            Z[i] ← z[i] + z[i]*(az[0] + az[1]*x[i] + az[2]*y[i] + az[3]*z[i])
        return ← Z
    return
## Нахождение коэфицентов интегральным методом
findCIM(x, y, z, n, xString, yString, zString) :=
    for i ∈ 0 .. n - 2
        X[i, 0] ← (x[i + 1] + x[i])/2
    for i ∈ 0 .. n - 2
        X[i, 2] ← (x[i + 1]*y[i + 1] + (x[i]*y[i]))/2
    for i ∈ 0 .. n - 2
        X[i, 1] ← (x[i + 1]^2 + x[i]^2)/2
    for i ∈ 0 .. n - 2
        X[i, 3] ← (x[i + 1]*z[i + 1] + (x[i]*z[i]))/2
    for i ∈ 0 .. n - 2
        dx[i] ← x[i + 1] - x[i]
    ans ← (transpose(X)*X)^-1*transpose(X)*dx
    copyAns ← ans
    if (xString == "y") and (yString == "x") and (zString == "z")
        ans[1] ← copyAns[2]
        ans[2] ← copyAns[1]
    if (xString == "z") and (yString == "x") and (zString == "y")
        ans[1] ← copyAns[2]
        ans[2] ← copyAns[3]
        ans[3] ← copyAns[1]
    ans
## Доля выручки
array := [1; 2; 3; 4; 5; 6; 7; 8]
n := 8
x := [0.0783; 0.5043; 0.6973; 0.8213; 0.8461; 0.8767; 0.9097; 0.9788]
y := [0.2228; 0.0690; 0.0245; 0.0328; 0.0530; 0.0175; 0.0335; 0.0097]
z := [0.6989; 0.4266; 0.2782; 0.1458; 0.1008; 0.1058; 0.0568; 0.0115]
## Нахождение коэфицентов интегральным методом
ax := findCIM(x, y, z, n, "x", "y", "z")
ay := findCIM(y, x, z, n, "y", "x", "z")
az := findCIM(z, x, y, n, "z", "x", "y")
ax = [-3860.34; 3859.95; 3876.95; 3860.76]
ay = [2477.07; -2477.18; -2473.91; -2479.72]
az = [4247.33; -4247.96; -4246.6; -4248.37]
matrix_XX(ax, ay, az) :=
    for i ∈ 0 .. 3
        XX[0, i] ← ax[i]
        XX[1, i] ← ay[i]
        XX[2, i] ← az[i]
    XX
XX := matrix_XX(ax, ay, az)
XX = [
    -3860.34, 3859.95, 3876.95, 3860.76;
    2477.07, -2477.18, -2473.91, -2479.72;
    4247.33, -4247.96, -4246.6, -4248.37
]
## Прогноз долей по данным за каждый  год
yI := findPrognoz(ax, ay, az, x[7], y[7], z[7], 3, "y")
zI := findPrognoz(ax, ay, az, x[7], y[7], z[7], 3, "z")
xI := findPrognoz(ax, ay, az, x[7], y[7], z[7], 3, "x")
doliI :=
    temp[:, 0] ← xI
    temp[:, 1] ← yI
    temp[:, 2] ← zI
    temp
doliI = [0.9788, 0.0097, 0.0115; 0.762611, 0.0085786, 0.00445742; -659.839, 4.77539, 4.24985]  # ошибка на 3 году
## Среднеквадратичная ошибка
sqError(xI, yI, zI, x, y, z, 2) = [0.0487569; 0.00272569; 0.0361513]
## Прогноз долей по данным на 1 год
xIR := findProgOnReal(ax, ay, az, x, y, z, n, "x")
yIR := findProgOnReal(ax, ay, az, x, y, z, n, "y")
zIR := findProgOnReal(ax, ay, az, x, y, z, n, "z")
doliIR :=
    temp[:, 0] ← xIR
    temp[:, 1] ← yIR
    temp[:, 2] ← zIR
    temp  # x  # y  # z
# подсчет долей
# интегральным методом
doliIR = [
    0.388202, -0.0361336, 0.27484;
    0.875872, 0.0188477, 0.307907;
    0.86902, 0.00627936, 0.0828469;
    0.734584, 0.028438, 0.114946;
    1.0166, 0.0555033, 0.084097;
    0.866132, 0.0117374, 0.0380168;
    1.1102, 0.0283858, 0.022788
]
## Среднеквадратичная ошибка
sqError(xIR, yIR, zIR, x, y, z, 7) = [0.0189164; 0.0038877; 0.0132811]
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