n := 19
x := [0.52; 0.47; 0.43; 0.4; 0.38; 0.37; 0.36; 0.36; 0.35; 0.36; 0.37; 0.38; 0.39; 0.38; 0.37; 0.38; 0.38; 0.36; 0.34]
y := [0.15; 0.21; 0.27; 0.31; 0.35; 0.36; 0.37; 0.37; 0.38; 0.38; 0.39; 0.39; 0.39; 0.39; 0.39; 0.39; 0.4; 0.39; 0.38]
z := [0.33; 0.32; 0.3; 0.29; 0.28; 0.27; 0.27; 0.27; 0.27; 0.25; 0.24; 0.23; 0.22; 0.23; 0.24; 0.23; 0.22; 0.25; 0.28]
forX(x, y, z, n) :=
    for t ∈ 0 .. n - 2
        X[t, 0] ← (x[t + 1] + x[t])/2
    for t ∈ 0 .. n - 2
        X[t, 1] ← (x[t + 1]^2 + x[t]^2)/2
    for t ∈ 0 .. n - 2
        X[t, 2] ← (x[t + 1]*y[t + 1] + x[t]*y[t])/2
    for t ∈ 0 .. n - 2
        X[t, 3] ← (x[t + 1]*z[t + 1] + x[t]*z[t])/2
    X
# Цикл для заполнения матрицы X
D(x, n) :=
    for t ∈ 0 .. n - 2
        d[t] ← x[t + 1] - x[t]
    d
int_d(a, x, y, z) :=
    for t ∈ 0 .. n - 2
        int_d[t] ← x[t]*(a[0] + a[1]*x[t] + a[2]*y[t] + a[3]*z[t])
    int_d
# D(x, n) - цикл для подсчета изменения
# доли рынка x на основе исходных данных
# int_d(a, x, y, z) - цикл для подсчета изменения доли рынка x в год интегральным методом
X := forX(x, y, z, n)
X = [
    0.495, 0.24565, 0.08835, 0.161;
    0.45, 0.2029, 0.1074, 0.1397;
    0.415, 0.17245, 0.12005, 0.1225;
    0.39, 0.1522, 0.1285, 0.1112;
    0.375, 0.14065, 0.1331, 0.10315;
    0.365, 0.13325, 0.1332, 0.09855;
    0.36, 0.1296, 0.1332, 0.0972;
    0.355, 0.12605, 0.1331, 0.09585;
    0.355, 0.12605, 0.1349, 0.09225;
    0.365, 0.13325, 0.14055, 0.0894;
    0.375, 0.14065, 0.14625, 0.0881;
    0.385, 0.14825, 0.15015, 0.0866;
    0.385, 0.14825, 0.15015, 0.0866;
    0.375, 0.14065, 0.14625, 0.0881;
    0.375, 0.14065, 0.14625, 0.0881;
    0.38, 0.1444, 0.1501, 0.0855;
    0.37, 0.137, 0.1462, 0.0868;
    0.35, 0.1226, 0.1348, 0.0926
]
# матрица X
D(x, n) :=
    for t ∈ 0 .. n - 2
        d[t] ← x[t + 1] - x[t]
    d
# D(x, n) - цикл для подсчета изменения
# доли рынка на основе исходных данных
dx := D(x, n)
ax := (transpose(X)*X)^-1*transpose(X)*dx = [4.14924; -4.21356; -3.86539; -4.53204]
# таблица коэффициентов a0,a1,a2,a3
# для компании x
dy := D(y, n)
ay := (transpose(X)*X)^-1*transpose(X)*dy = [-2.14399; 2.3245; 1.74138; 2.54172]
# таблица коэффициентов a0,a1,a2,a3
# для компании y
dz := D(z, n)
az := (transpose(X)*X)^-1*transpose(X)*dz = [-2.05663; 1.98453; 2.16993; 1.98378]
# таблица коэффициентов a0,a1,a2,a3
# для компании z
int_dx := int_d(ax, x, y, z)
int_dx = [-0.0609395; -0.0437646; -0.0283182; -0.0194979; -0.0280321; -0.00923763; -0.00773455; -0.00773455; -0.0063011; 0.0109807; -0.00183784; -0.000677309; 0.000546921; -0.000677309; -0.00183784; -0.000677309; 0.00185595; -0.00293468]
dx = [-0.05; -0.04; -0.03; -0.02; -0.01; -0.01; 0; -0.01; 0.01; 0.01; 0.01; 0.01; -0.01; -0.01; 0.01; 0; -0.02; -0.02]
# int_dx - изменения доли рынка x в год посчитанные при помощи интегрального метода
# dx - изменения x в год по исходным данным
matrix_XX(ax, ay, az) :=
    for i ∈ 0 .. 3
        XX[i, 0] ← ax[i]
        XX[i, 1] ← ay[i]
        XX[i, 2] ← az[i]
    XX
XX := matrix_XX(ax, ay, az)
XX = [
    4.14924, -2.14399, -2.05663;
    -4.21356, 2.3245, 1.98453;
    -3.86539, 1.74138, 2.16993;
    -4.53204, 2.54172, 1.98378
]
