# шаговый метод
f(x) := cos(x) - e^(-x^2/2) + x - 1
x := 1, 1.1 .. 2
x = [1; 1.1; 1.2; 1.3; 1.4; 1.5; 1.6; 1.7; 1.8; 1.9; 2]
f(x) = [-0.0662284; 0.00752169; 0.0756055; 0.137941; 0.194656; 0.246085; 0.292763; 0.335409; 0.374899; 0.412236; 0.448518]
# Ответ : [1;1.1]
# метод половинного деления
a := 1
b := 1.1
f(x) := cos(x) - e^(-x^2/2) + x - 1
f(a)*f(b) = -0.000498149
xc(a, b) := (a + b)/2
int(a, b) := if(f(a)*f(xc(a, b)) < 0, [a; xc(a, b)], [xc(a, b); b])
int(a, b) = [1.05; 1.1]
a[0] := 1
b[0] := 1.1
i := 0 .. 5
[a[i + 1]; b[i + 1]] := int(a[i], b[i])
a[i] = [1; 1.05; 1.075; 1.0875; 1.0875; 1.0875]
b[i] = [1.1; 1.1; 1.1; 1.1; 1.09375; 1.09063]
i = [0; 1; 2; 3; 4; 5]
f(a[i]) = [-0.0662284; -0.028658; -0.0103922; -0.00139107; -0.00139107; -0.00139107]
f(b[i]) = [0.00752169; 0.00752169; 0.00752169; 0.00752169; 0.00307639; 0.000845424]
# Ответ : 1.088
# Метод ньютона
i := 0 .. 5
x[0] := 1
f(x) := cos(x) - e^(-x^2/2) + x - 1
f1(x) := d/dx(f(x)) → x*e^(-x^2/2) - sin(x) + 1
x[i + 1] := x[i] - f(x[i])/f1(x[i])
x[i] = [1; 1.08657; 1.08944; 1.08944; 1.08944; 1.08944]
f(x[i]) = [-0.0662284; -0.0020604; -2.33564e-6; -3.01703e-12; 0; 0]
i = [0; 1; 2; 3; 4; 5]
# Ответ : 1.089
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f(x) := cos(x) - e^(-x^2/2) + x - 1
a := 1
b := 1.1
f(a)*f(b) = -0.000498149
xc := (a + b)/2
Given
f(xc) = -0.028658
xk := Find(xc)
xk = 0
f(xk) = -1
TOL := 0.001
x0 := 1
xk := root(f(x0), x0)
xk = 1.08944  # Ответ : 1.089
