B := [3; 8; 9; 12]
A := [15, -4, 0, 6; 6, 16, -6, 1; 2, 4, 17, 6; -3, -5, 4, 18]
X := A^-1*B
# Ответ :
X = [0.0209856; 0.494632; 0.136221; 0.777291]
B := [3; 8; 9; 12]
A := [15, -4, 0, 6; 6, 16, -6, 1; 2, 4, 17, 6; -3, -5, 4, 18]
ORIGIN := 1
k := 1 .. 10
x1[1] := 0
x2[1] := 0
x3[1] := 0
x4[1] := 0
[x1[k + 1]; x2[k + 1]; x3[k + 1]; x4[k + 1]] := [
    (B[1] - (A[1, 2]*x2[k] + A[1, 3]*x3[k] + A[1, 4]*x4[k]))/A[1, 1];
    (B[2] - (A[2, 1]*x1[k] + A[2, 3]*x3[k] + A[2, 4]*x4[k]))/A[2, 2];
    (B[3] - (A[3, 1]*x1[k] + A[3, 2]*x2[k] + A[3, 4]*x4[k]))/A[1, 1];
    (B[4] - (A[4, 1]*x1[k] + A[4, 2]*x2[k] + A[4, 3]*x3[k]))/A[4, 4]
]
# Ответ :
k = [1; 2; 3; 4; 5; 6; 7; 8; 9; 10]
x1[k] = [0; 0.2; 0.0666667; 0.08; 0.00894444; 0.012466; 0.024642; 0.0263317; 0.0231687; 0.0224869]
x2[k] = [0; 0.5; 0.608333; 0.495903; 0.474485; 0.497747; 0.506517; 0.501587; 0.498935; 0.499841]
x3[k] = [0; 0.6; 0.173333; 0.146667; 0.133796; 0.158215; 0.157515; 0.152904; 0.152145; 0.153299]
x4[k] = [0; 0.666667; 0.705556; 0.808241; 0.785158; 0.770226; 0.771849; 0.776469; 0.776406; 0.775311]
A := [15, -4, 0, 6; 6, 16, -6, 1; 2, 4, 17, 6; -3, -5, 4, 18]
B := [3; 8; 9; 12]
Origin := 1
k := 1 .. 10
x1[1] := 0
x2[1] := 0
x3[1] := 0
x4[1] := 0
[x1[k + 1]; x2[k + 1]; x3[k + 1]; x4[k + 1]] := [
    (B[1] - (A[1, 2]*x2[k] + A[1, 3]*x3[k] + A[1, 4]*x4[k]))/A[1, 1];
    (B[2] - (A[2, 1]*(B[1] - (A[1, 2]*x2[k] + A[1, 3]*x3[k] + A[1, 4]*x4[k]))/A[1, 1] + A[2, 3]*x3[k] + A[2, 4]*x4[k]))/A[2, 2];
    (B[3] - (A[3, 1]*(B[1] - (A[1, 2]*x2[k] + A[1, 3]*x3[k] + A[1, 4]*x4[k]))/A[1, 1] + A[3, 2]*(B[2] - (A[2, 1]*(B[1] - (A[1, 2]*x2[k] + A[1, 3]*x3[k] + A[1, 4]*x4[k]))/A[1, 1] + A[2, 3]*x3[k] + A[2, 4]*x4[k]))/A[2, 2] + A[3, 4]*x4[k]))/A[3, 3];
    (B[4] - (A[4, 1]*(B[1] - (A[1, 2]*x2[k] + A[1, 3]*x3[k] + A[1, 4]*x4[k]))/A[1, 1] + A[4, 2]*(B[2] - (A[2, 1]*(B[1] - (A[1, 2]*x2[k] + A[1, 3]*x3[k] + A[1, 4]*x4[k]))/A[1, 1] + A[2, 3]*x3[k] + A[2, 4]*x4[k]))/A[2, 2] + A[4, 3]*(B[3] - (A[3, 1]*(B[1] - (A[1, 2]*x2[k] + A[1, 3]*x3[k] + A[1, 4]*x4[k]))/A[1, 1] + A[3, 2]*(B[2] - (A[2, 1]*(B[1] - (A[1, 2]*x2[k] + A[1, 3]*x3[k] + A[1, 4]*x4[k]))/A[1, 1] + A[2, 3]*x3[k] + A[2, 4]*x4[k]))/A[2, 2] + A[3, 4]*x4[k]))/A[3, 3]))/A[4, 4]
]
# Ответ :
k = [1; 2; 3; 4; 5; 6; 7; 8; 9; 10]
x1[k] = [0; 0.2; 0.0221895; 0.036414; 0.0174402; 0.0208465; 0.021076; 0.0209985; 0.0209804; 0.0209854]
x2[k] = [0; 0.425; 0.598394; 0.484268; 0.492023; 0.4949; 0.494768; 0.494614; 0.494628; 0.494633]
x3[k] = [0; 0.405882; 0.129111; 0.126043; 0.136562; 0.136665; 0.136195; 0.136203; 0.136222; 0.136222]
x4[k] = [0; 0.727859; 0.807894; 0.779245; 0.775899; 0.777243; 0.777349; 0.777292; 0.777288; 0.777291]
