С := [1, 0.4, 0.4^2; 1, 0.7, 0.7^2; 1, 1, 1^2]
B := [0.7; 0.9; 0.95]
a := С^-1*B
a = [0.2; 1.58333; -0.833333]
P2(x) := a[0] + a[1]*x + a[2]*x^2
O[2] := P2(0.4) - 0.7
O[2] = -2.22045e-16
O[3] := P2(0.7) - 0.9
O[3] = 0
X := [0.1; 0.2; 0.4; 0.7; 1]
Y := [0.15; 0.4; 0.7; 0.9; 0.95]
xg := 0, 0.1 .. 1
i := 0 .. 4
P2(xg) = [0.2; 0.35; 0.483333; 0.6; 0.7; 0.783333; 0.85; 0.9; 0.933333; 0.95; 0.95]
xg = [0; 0.1; 0.2; 0.3; 0.4; 0.5; 0.6; 0.7; 0.8; 0.9; 1]
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B := [0.15; 0.4; 0.7; 0.9; 0.95]
C := [
    1, 0.1, 0.1^2, 0.1^3, 0.1^4;
    1, 0.2, 0.2^2, 0.2^3, 0.2^4;
    1, 0.4, 0.4^2, 0.4^3, 0.4^4;
    1, 0.7, 0.7^2, 0.7^3, 0.7^4;
    1, 1, 1^2, 1^3, 1^4
]
a := C^-1*B
a = [-0.199691; 4.09336; -6.49306; 5.4784; -1.92901]
P2(x) := a[0] + a[1]*x + a[2]*x^2 + a[3]*x^3 + a[4]*x^4
O[2] := P2(0.4) - 0.7
O[2] = -4.44089e-16
O[3] := P2(0.7) - 0.9
O[3] = -1.66533e-15
X := [0.1; 0.2; 0.4; 0.7; 1]
Y := [0.15; 0.4; 0.7; 0.9; 0.95]
xg := 0, 0.1 .. 1
i := 0 .. 4
xg = [0; 0.1; 0.2; 0.3; 0.4; 0.5; 0.6; 0.7; 0.8; 0.9; 1]
P2(xg) = [-0.199691; 0.15; 0.4; 0.576235; 0.7; 0.787963; 0.85216; 0.9; 0.934259; 0.953086; 0.95]
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x := [0.1; 0.2; 0.4; 0.7; 1]
y := [0.15; 0.4; 0.7; 0.9; 0.95]
i := 0 .. 4
D := [
    5, sum(x[i], i = 0 .. 4), sum((x^2)[i], i = 0 .. 4);
    sum(x[i], i = 0 .. 4), sum((x^2)[i], i = 0 .. 4), sum((x^3)[i], i = 0 .. 4);
    sum((x^2)[i], i = 0 .. 4), sum((x^3)[i], i = 0 .. 4), sum((x^4)[i], i = 0 .. 4)
]
F := [sum(y[i], i = 0 .. 4); sum(x[i]*y[i], i = 0 .. 4); sum((x^2)[i]*y[i], i = 0 .. 4)]
b := D^-1*F
b = [-0.0451706; 2.36352; -1.38035]
P2(x) := b[0] + b[1]*x + b[2]*x^2
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O[i] := P2(x[i]) - y[i]
O = [0.0273776; -0.0276811; -0.0206192; 0.0329219; -0.0119992]
x := [0.1; 0.2; 0.4; 0.7; 1]
y := [0.15; 0.4; 0.7; 0.9; 0.95]
i := 0 .. 4
D := [
    5, sum(x[i], i = 0 .. 4), sum((x^2)[i], i = 0 .. 4), sum((x^3)[i], i = 0 .. 4), sum((x^4)[i], i = 0 .. 4);
    sum(x[i], i = 0 .. 4), sum((x^2)[i], i = 0 .. 4), sum((x^3)[i], i = 0 .. 4), sum((x^4)[i], i = 0 .. 4), sum((x^5)[i], i = 0 .. 4);
    sum((x^2)[i], i = 0 .. 4), sum((x^3)[i], i = 0 .. 4), sum((x^4)[i], i = 0 .. 4), sum((x^5)[i], i = 0 .. 4), sum((x^6)[i], i = 0 .. 4);
    sum((x^3)[i], i = 0 .. 4), sum((x^4)[i], i = 0 .. 4), sum((x^5)[i], i = 0 .. 4), sum((x^6)[i], i = 0 .. 4), sum((x^7)[i], i = 0 .. 4);
    sum((x^4)[i], i = 0 .. 4), sum((x^5)[i], i = 0 .. 4), sum((x^6)[i], i = 0 .. 4), sum((x^7)[i], i = 0 .. 4), sum((x^8)[i], i = 0 .. 4)
]
F := [
    sum(y[i], i = 0 .. 4);
    sum(x[i]*y[i], i = 0 .. 4);
    sum((x^2)[i]*y[i], i = 0 .. 4);
    sum((x^3)[i]*y[i], i = 0 .. 4);
    sum((x^4)[i]*y[i], i = 0 .. 4)
]
b := D^-1*F
b = [-0.199691; 4.09336; -6.49306; 5.4784; -1.92901]
P2(x) := b[0] + b[1]*x + b[2]*x^2 + b[3]*x^3 + b[4]*x^4
O[i] := P2(x[i]) - y[i]
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O = [-3.52496e-13; -1.04011e-12; -4.67804e-12; -1.92993e-11; -5.27052e-11]
x := [0.1; 0.2; 0.4; 0.7; 1]
y := [0.15; 0.4; 0.7; 0.9; 0.95]
t := 0, 0.1 .. 1.1
i := 0 .. 4
N11(t) := y[0] + ((y[1] - y[0])*(t - x[0]))/(x[1] - x[0])
N12(t) := y[1] + ((y[2] - y[1])*(t - x[1]))/(x[2] - x[1])
N13(t) := y[2] + ((y[3] - y[2])*(t - x[2]))/(x[3] - x[2])
N14(t) := y[3] + ((y[4] - y[3])*(t - x[2]))/(x[4] - x[3])
f1(t) := if(t < x[1], N11(t), if(t < x[2], N12(t), if(t < x[3], N13(t), N14(t))))
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x := [0.1; 0.2; 0.4; 0.7; 1]
y := [0.15; 0.4; 0.7; 0.9; 0.95]
t := 0, 0.1 .. 1.1
N21(t) := y[0] + ((y[1] - y[0])*(t - x[0]))/(x[1] - x[0]) + ((((y[2] - y[0])/(x[2] - x[0])) - ((y[1] - y[0])/(x[1] - x[0])))/(x[2] - x[1]))*((t - x[0])*(t - x[1]))
N22(t) := y[2] + ((y[3] - y[2])*(t - x[2]))/(x[3] - x[2]) + ((((y[4] - y[2])/(x[4] - x[2])) - ((y[3] - y[2])/(x[3] - x[2])))/(x[4] - x[3]))*((t - x[2])*(t - x[3]))
f2(t) := if(t < x[2], N21(t), N22(t))
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