f(x) := e^x/(1 + e^(2*x))
a := 0
b := 1
n := 10
hx := (b - a)/n
# Метод левых прямоугольников
i := 0 .. n - 1
x[i] := a + i*hx
y[i] := f(x[i])
y = [0.5; 0.49751; 0.490164; 0.478314; 0.462504; 0.443409; 0.421775; 0.398353; 0.37385; 0.348897]
x = [0; 0.1; 0.2; 0.3; 0.4; 0.5; 0.6; 0.7; 0.8; 0.9]
ILP := hx*sum(f(x[i]), i)
ILP = 0.441478
# Метод правых прямоугольников
ORIGIN := 1
i := 1 .. n
x[i] := a + i*hx
y[i] := f(x[i])
x = [0.1; 0.2; 0.3; 0.4; 0.5; 0.6; 0.7; 0.8; 0.9; 1]
y = [0.49751; 0.490164; 0.478314; 0.462504; 0.443409; 0.421775; 0.398353; 0.37385; 0.348897; 0.324027]
IPP := hx*sum(f(x[i]), i)
IPP = 0.42388
# Метод центральных прямоугольников
i := 1 .. n
xc[i] := a + (i - 1/2)*hx
yc[i] := f(xc[i])
xc = [0.05; 0.15; 0.25; 0.35; 0.45; 0.55; 0.65; 0.75; 0.85; 0.95]
yc = [0.499376; 0.494427; 0.484772; 0.470864; 0.453321; 0.432862; 0.410242; 0.386195; 0.361394; 0.336423]
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ICP := hx*sum(f(xc[i]), i)
ICP = 0.432988
# метод трапеций
i := 1 .. n - 1
x[i] := a + i*hx
ITR := hx*(((f(a) + f(b))/2) + sum(f(x[i]), i))
ITR = 0.432679
# метод парабол
i := 1, 3 .. n - 1
S1 := sum(f(x[i]), i)
i := 2, 4 .. n - 2
S2 := sum(f(x[i]), i)
IPR := (f(a) + f(b) + 4*S1 + 2*S2)*hx/3
IPR = 0.432885
integral(f(x), x = a .. b) = 0.432885
