fy(z) := z
fz(y, z, x) := 5*z - 6*y + e^(x^3)
a := 0
b := 0.25
n := 4
x[0] := 0
hx := (b - a)/n
y[0] := 0
z[0] := 0
i := 0 .. 4
[x[i + 1]; y[i + 1]; z[i + 1]] := [x[i] + hx; y[i] + hx*fy(z[i]); z[i] + hx*fz(y[i], z[i], x[i])]
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x[i] = [0; 0.0625; 0.125; 0.1875; 0.25]
y[i] = [0; 0; 0.00390625; 0.0129404; 0.0286201]
z[i] = [0; 0.0625; 0.144547; 0.250875; 0.387334]
i = [0; 1; 2; 3; 4]
fy(z) := z
fz(y, z, x) := 5*z - 6*y + e^(x^3)
a := 0
b := 0.25
n := 4
x[0] := 0
hx := (b - a)/n
y[0] := 0
z[0] := 0
i := 0 .. 8
[x[i + 1]; y[i + 1]; z[i + 1]] := [x[i] + hx/2; y[i] + hx/2*fy(z[i]); z[i] + hx/2*fz(y[i], z[i], x[i])]
x[i] = [0; 0.03125; 0.0625; 0.09375; 0.125; 0.15625; 0.1875; 0.21875; 0.25]
y[i] = [0; 0; 0.000976562; 0.00308231; 0.00648815; 0.0113855; 0.0179884; 0.0265367; 0.0372983]
z[i] = [0; 0.03125; 0.0673838; 0.108987; 0.156714; 0.211295; 0.273545; 0.34437; 0.424781]
i = [0; 1; 2; 3; 4; 5; 6; 7; 8]
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fy(z) := z
fz(y, z, x) := 5*z - 6*y + e^(x^3)
a := 0
b := 0.25
n := 4
x[0] := 0
hx := (b - a)/n
y[0] := 0
z[0] := 0
i := 0 .. 4
[x[i + 1]; y[i + 1]; z[i + 1]] := [x[i] + hx; y[i] + hx*fy(z[i] + hx/2); z[i] + hx*fz(y[i] + hx/2, z[i] + hx/2, x[i] + hx/2)]
x[i] = [0; 0.0625; 0.125; 0.1875; 0.25]
y[i] = [0; 0.00195312; 0.00769055; 0.0183522; 0.0353541]
z[i] = [0; 0.0605488; 0.139336; 0.240781; 0.370347]
i = [0; 1; 2; 3; 4]
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y := [0; 0]
a := 0
b := 0.25
n := 4
D(x, y) := [y[1]; 5*y[1] - 6*y[0] + e^(x^3)]
Z := rkfixed(y, a, b, n, D)
i := 0 .. n
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Z = [
    0, 0, 0;
    0.0625, 0.0021687, 0.0730841;
    0.125, 0.00965147, 0.171031;
    0.1875, 0.0242004, 0.300431;
    0.25, 0.0480294, 0.469536
]
