A := [6, 1, 3; 1, 7, 2; 3, 2, 8]
b := [-17; -21; -31]
n := 3
Gradient :=
    x[0] ←
        for i ∈ 0 .. n - 1
            x[i, 0] ← 0
        x[0, 0] ← 1
        x
    r[0] ←
        r[0] ← A*x[0] - b
        r[0]
    β[0] ←
        β[0] ← -(r[0]*r[0])/((A*r[0])*r[0])
        β[0]
    d[1] ←
        d[1] ← β[0]*r[0]
        d[1]
    x[1] ←
        x[1] ← x[0] + d[1]
        x[1]
    for i ∈ 1 .. n - 1
        r[i] ← A*x[i] - b
        α[i] ← ((r[i]*r[i])*(A*r[i])*d[i] - (r[i]*d[i])*(A*r[i])*r[i])/((A*d[i])*d[i]*(A*r[i])*r[i] - ((A*r[i])*d[i])^2)
        β[i] ← ((r[i]*d[i])*(A*r[i])*d[i] - (r[i]*r[i])*(A*d[i])*d[i])/((A*r[i])*r[i]*(A*d[i])*d[i] - ((A*r[i])*d[i])^2)
        d[i + 1] ← α[i]*d[i] + β[i]*r[i]
        x[i + 1] ← x[i] + d[i + 1]
    x[n]
Gradient = [-1; -2; -3]
