a := [
    2.62, -0.64, -8.02, 1.35;
    3.33, -5.32, 8.02, -7.3;
    -9.27, -6.56, -5.83, -2.39;
    1.79, 9.4, 1.19, 0.6
]
b := [50.1; -91.4; 58.7; 67.4]
Seidel :=
    for i ∈ 0 .. 3
        s ← 0
        x[i] ← 0
        x0[i] ← 0
        for j ∈ 0 .. 3
            s ← s + |a[i, j]| if j ≠ i
        return 0 if s ≥ |a[i, i]|
    k ← 0
    e ← 0.001
    while 1
        for i ∈ 0 .. 3
            x[i] ← b[i]
            for j ∈ 0 .. 3
                x[i] ← x[i] - x0[j]*a[i, j] if i ≠ j
            x[i] ← x[i]/a[i, i]
            k ← k + 1 if |x[i] - x0[i]| < e
            x0[i] ← x[i]
        break if k == 4
        k ← 0
    x
[-4,989343; 9*,895121; -10,00642; -7,95992]
a := [
    2.62, -0.64, -8.02, 1.35;
    3.33, -5.32, 8.02, -7.3;
    -9.27, -6.56, -5.83, -2.39;
    1.79, 9.4, 1.19, 0.6
]
b := [50.1; -91.4; 58.7; 67.4]
