A := [1, 3 - 4i, 11 + 5i; 3 + 4i, -3, 7 + 1i; 11 - 5i, 7 - 1i, -4]
B := [48 + 31i; 28 + 13i; 7 - 31i]
transpose(A) = [1, 3 + 4i, 11 - 5i; 3 - 4i, -3, 7 - 1i; 11 + 5i, 7 + 1i, -4]
a := transpose(A)*A
b := transpose(A)*B
ORIGIN := 1
a = [90 - 86i, 66 - 62i, -16 + 56i; 66 - 62i, 50 - 38i, 4 - 28i; -16 + 56i, 4 - 28i, 160 + 124i]
b = [2 - 194i; 202 - 362i; 528 + 824i]
n := 3
squerRoot :=
    T[n, n] ← 0
    T[1, 1] ← sqrt(a[1, 1])
    for j ∈ 2 .. n
        T[1, j] ← a[1, j]/T[1, 1]
    for i ∈ 2 .. n
        sum ← 0
        for k ∈ 1 .. i - 1
            sum ← sum + T[k, i]^2
        T[i, i] ← sqrt(a[i, i] - sum)
        for j ∈ i .. n
            sum ← 0
            for k ∈ 1 .. i - 1
                sum ← sum + T[k, i]*T[k, j]
            T[i, j] ← (a[i, j] - sum)/T[i, i] if j ≠ i
    y[n] ← 0
    y[1] ← b[1]/T[1, 1]
    for i ∈ 2 .. n
        sum ← 0
        for k ∈ 1 .. i - 1
            sum ← sum + T[k, i]*y[k]
        y[i] ← (b[i] - sum)/T[i, i]
    x[n] ← 0
    x[n] ← y[n]/T[n, n]
    for i ∈ (n - 1) .. 1
        sum ← 0
        for k ∈ n .. i + 1
            sum ← sum + T[i, k]*x[k]
        x[i] ← (y[i] - sum)/T[i, i]
    x
squerRoot = [1 - 2i; 3 + 1i; 4 + 2i]
