A := [
    -5.709, 4.350, 8.639, 3;
    1.650, -5.350, 6.300, -9.049;
    7.250, 8.200, 5.459, 3.670;
    -0.869, -7.189, 1.950, 4.759
]
b[0] := [84.1; 58.1; 42.3; 0.5]
Ortogonalia :=
    r[0] ← A[:, 0]
    for i ∈ 1 .. 3
        r[i] ← A[:, i]
        for k ∈ 0 .. i
            t[k, i] ← r[k]*A[:, i]/(r[k]*r[k])
            p[k] ← t[k, i]*r[k]
            p[k] ← p[k] + p[k - 1] if k > 0
        r[i] ← A[:, i] - p[k] + r[i]
    k ← 0
    for i ∈ 3 .. 0
        x[i] ← r[i]*b[k]/(r[i]*A[:, i])
        b[k + 1] ← b[k] - x[i]*A[:, i]
        k ← k + 1
    X ← [x[0]; x[1]; x[2]; x[3]]
Ortogonalia = [-1.45818; 1.41704; 8.59314; -1.54165]
