A := [1 + 2i, 4 - 5i, 7 + 4i; 8 + 1i, 2 - 1i, 1 + 1i; 3 + 1i, 1 + 1i, 2 + 3i]
b := [40 + 67i; 15 + 33i; 8 - 41i]
E := [1, 0, 0; 0, 1, 0; 0, 0, 1]
a := [
    (1 + 2i), (4 - 5i), (7 + 4i), 40 + 67i;
    (8 + 1i), (2 - 1i), (1 + 1i), 15 + 33i;
    (3 + 1i), (1 + 1i), (2 + 3i), 8 - 41i
]
Otrazenii :=
    for i ∈ 0 .. 1
        s[i] ← [a[0 + i, 0]; a[1, 0 + i]; a[2, 0 + i]]
        h[i] ← [E[0, 0 + i]; E[1, 0 + i]; E[2, 0 + i]]
        S[i] ← (s[i][0]*s[i][0]) + (s[i][1]*s[i][1]) + (s[i][2]*s[i][2])
        b[i] ← S[i]^(1/2)
        b[i] ← -1*b[i] if Re(S[i]) < 0
        p[i] ← sqrt(2*(S[i] + b[i]*a[0 + i, 0 + i]))
        W[i] ← 1/p[i]*(s[i] + b[i]*h[i])
        U[i] ← E - 2*W[i]*transpose(W[i])
        a ← U[i]*a
    x3 ← a[2, 3]/a[2, 2]
    x2 ← (a[1, 3] - a[1, 2]*x3)/a[1, 1]
    x1 ← (a[0, 3] - a[0, 2]*x3 - a[0, 1]*x2)/a[0, 0]
    X ← [x1; x2; x3]
    X
Проверка
x := Otrazenii = [3.44963 - 1.01659i; -20.5584 + 17.2011i; -3.48766 - 13.7898i]
A*x = [40 + 67i; 15 + 33i; 8 - 41i]
