SimpleIteration :=
    A ← [
        -22.17, -3.39, 4.44, 11.07;
        0.93, 9.41, 0.35, -0.23;
        1.49, -1.85, -10.35, -2.18;
        -7.57, 3.12, -4.32, 18.81
    ]
    B ← [80.6; -44.6; 10.8; 176.8]
    e ← 0.001
    s0 ← |A[0, 0]| > |A[0, 1]| + |A[0, 2]| + |A[0, 3]|
    s1 ← |A[1, 1]| > |A[1, 0]| + |A[1, 2]| + |A[1, 3]|
    s2 ← |A[2, 2]| > |A[2, 0]| + |A[2, 1]| + |A[2, 3]|
    s3 ← |A[3, 3]| > |A[3, 0]| + |A[3, 1]| + |A[3, 2]|
    if s0 and s1 and s2 and s3
        T ← ["усл сх", "вып"]
        x ← [0; 0; 0; 0]
        xx ← x
        k ← 0
        while 1
            x[0] ← (B[0] - A[0, 1]*xx[1] - A[0, 2]*xx[2] - A[0, 3]*xx[3])/A[0, 0]
            x[1] ← (B[1] - A[1, 0]*xx[0] - A[1, 2]*xx[2] - A[1, 3]*xx[3])/A[1, 1]
            x[2] ← (B[2] - A[2, 0]*xx[0] - A[2, 1]*xx[1] - A[2, 3]*xx[3])/A[2, 2]
            x[3] ← (B[3] - A[3, 0]*xx[0] - A[3, 1]*xx[1] - A[3, 2]*xx[2])/A[3, 3]
            k ← k + 1
            s0 ← |x[0] - xx[0]| < e
            s1 ← |x[1] - xx[1]| < e
            s2 ← |x[2] - xx[2]| < e
            s3 ← |x[3] - xx[3]| < e
            break if s0 and s1 and s2 and s3
            xx ← x
        T ← stack(T, ["x1", x[0]; "x2", x[1]; "x3", x[2]; "x4", x[3]; "k", k])
    T ← "усл сх не вып" otherwise
    T
    = ["усл сх", "вып"; "x1", 1.82831; "x2", -4.58608; "x3", -2.15132; "x4", 10.4016; "k", 13]
SimpleIteration = ["усл сх", "вып"; "x1", 1.82831; "x2", -4.58608; "x3", -2.15132; "x4", 10.4016; "k", 13]
a := [
    -22.17, -3.39, 4.44, 11.07;
    0.93, 9.41, 0.35, -0.23;
    1.49, -1.85, -10.35, -2.18;
    -7.57, 3.12, -4.32, 18.81
]
b := [80.6; -44.6; 10.8; 176.8]
SimpleIteration :=
    for i ∈ 0 .. 3
        s ← 0
        x[i] ← 0
        x0[i] ← 0
        for j ∈ 0 .. 3
            s ← s + |a[i, j]| if j ≠ i
        return 0 if s ≥ |a[i, i]|
    k ← 0
    e ← 0.001
    while 1 ≠ 2
        for i ∈ 0 .. 3
            x[i] ← b[i]
            for j ∈ 0 .. 3
                x[i] ← x[i] - x0[j]*a[i, j] if i ≠ j
            x[i] ← x[i]/a[i, i]
        for i ∈ 0 .. 3
            k ← k + 1 if |x[i] - x0[i]| < e
            x0[i] ← x[i]
        break if k == 4
        k ← 0
    x
    = [1.82831; -4.58608; -2.15132; 10.4016]
SimpleIteration = [1.82831; -4.58608; -2.15132; 10.4016]
