# Метод Рунге-Кутты, Адамса и правило Рунге
# 7 вариант
F(x, y) := e^(x*y)
a := 0
b := 0.3
y[0] := 0
x[0] := 0
n := 6
h := 0.1
X(x) :=
    for i ∈ 1 .. n - 1
        x[i] ← a + i*h
    return x
RungeKutta(F, y) :=
    for i ∈ 1 .. n - 1
        x[i] ← a + i*h
    for i ∈ 0 .. n - 2
        k1 ← F(x[i], y[i])
        k2 ← F(h/2 + x[i], h*k1/2 + y[i])
        k3 ← F(h/2 + x[i], h*k2/2 + y[i])
        k4 ← F(h + x[i], h*k3 + y[i])
        y[i + 1] ← y[i] + h*((k1 + 2*k2 + 2*k3 + k4)/6)
    return augment(y)
y := RungeKutta(F, y)
x := X(x) = [0; 0.1; 0.2; 0.3; 0.4; 0.5]
y = [0; 0.100335; 0.202721; 0.309427; 0.423213; 0.547755]
# Производные функции по x
der(x, y) :=
    for i ∈ 0 .. n - 1
        f[i] ← e^(x[i]*y[i])
    return f
f := der(x, y) = [1; 1.01008; 1.04138; 1.09727; 1.18446; 1.31505]
# Адамс экстраполяционный
AdamsExtra(x) :=
    for i ∈ n - 3 .. n - 2
        y[i + 1] ← y[i] + h/24*(55*f[i] - 59*f[i - 1] + 37*f[i - 2] - 9*f[i - 3])
    return y
y := AdamsExtra(x) = [0; 0.100335; 0.202721; 0.309427; 0.423101; 0.547461]
# Адамс интерполяционный
AdamsInter(x) :=
    for i ∈ n - 3 .. n - 2
        y[i + 1] ← y[i] + h/24*(9*f[i + 1] + 19*f[i] - 5*f[i - 1] + f[i - 2])
    return y
y := AdamsInter(x) = [0; 0.100335; 0.202721; 0.309427; 0.423225; 0.547788]
# Правило Рунге
a := 0
n := 5
b := 0.5
y := rkfixed(y[0], a, b, n, F) = [0, 0; 0.1, 0.100335; 0.2, 0.202721; 0.3, 0.309427; 0.4, 0.423213; 0.5, 0.547755]
RuleRunge := (y[:, 1]^h - y[:, 1]^(h*2))/(2^4 - 1) = [0; 0.010881; 0.00838333; 0.00656223; 0.00504039; 0.00366696]
# Метод прогонки
a := 1
b := 1.5
n := 8
h := (b - a)/11
yp[0] := 1.3
sh := 6, 5 .. 0
yp[n - 1] := 1.1
f(x) := (sqrt(x) + cos((2*x)/π))
x[n - 1] := b
x[0] := a
A(x) := 0.4 + 2*x + x^2/2
sh = [6; 5; 4; 3; 2; 1; 0]
B(x) := x^0.7
C(x) := -0.95*x^2
L[0] := 0
K[0] := yp[0]
ai(x) := A(x)/h^2
ci(x) := A(x)/h^2 + B(x)/h
bi(x) := C(x) - (2*A(x)/h^2) - (B(x)/h)
Func2(f) :=
    for i ∈ 1 .. n - 2
        x[i] ← a + i*h
    for i ∈ 1 .. n - 2
        L[i] ← -ci(x[i])/(ai(x[i])*L[i - 1] + bi(x[i]))
        K[i] ← (f(x[i - 1]) - ai(x[i])*K[i - 1])/(ai(x[i])*L[i - 1] + bi(x[i]))
    for i ∈ sh
        yp[i] ← L[i]*yp[i + 1] + K[i]
    return augment(yp)
Func2(f) = [1.3; 1.26439; 1.23086; 1.19989; 1.1714; 1.1453; 1.12152; 1.1]
