# Задание 1
f(x) := e^(-2*x) - 2*x + 1
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# Задание 2
f(x) := x^4 + 4*x^3 - 8*x^2 - 17
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a := -6
d/dx(f(x)) → 4*x^3 + 12*x^2 - 16*x
b := -4
e := 0.01
d/dx(f(x) == 0) solve, x → [0; 1; -4]
i := 0
Func2 :=
    while 1 ≠ 2
        x[i] ← (a + b)/2
        a ← x[i] if f(a)*f(x[i]) > 0
        b ← x[i] otherwise
        i ← i + 1
        break if |f(x[i - 1])| < e
    x
Func2 = [-5; -5.5; -5.75; -5.625; -5.5625; -5.53125; -5.54688; -5.53906; -5.54297; -5.54492; -5.54395; -5.54346; -5.54321; -5.54309]
# Задание 3
y1(x) := 0.5^x - 1
y2(x) := x + 2
f(x) := 0.5^x - 1 - (x + 2)
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# Задание 4
y2(x) := -1/x^2
y1(x) := cos(2*x)
f(x) := x^2*cos(2*x) + 1
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a := 1
b := 1.2
e := 0.01
i := 0
Func4 :=
    while 1 ≠ 2
        x[i] ← (a + b)/2
        a ← x[i] if f(a)*f(x[i]) > 0
        b ← x[i] otherwise
        i ← i + 1
        break if |f(x[i - 1])| < e
    x
Func4 = [1.1; 1.15; 1.175; 1.1875; 1.18125]
