# Задание 1
y1(x) := 3*x - 1
f(x) := 3*x - cos(x) - 1
y2(x) := cos(x)
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x[0] := 0.5
b := 2
e := 0.01
i := 0
Func1 :=
    while 1 ≠ 2
        x[i + 1] ← x[i] - f(x[i])/(f(b) - f(x[i]))*(b - x[i])
        i ← i + 1
        break if |x[i - 1] - x[i]| < e
    x[i]
    = 0.606333
# Задание 2
f(x) := x^3 + 0.2*x^2 + 0.5*x - 1.2
a := 0.5
i := 0
f(a) = -0.775
x[0] := 1
e := 0.01
Func2 :=
    while 1 ≠ 2
        x[i + 1] ← a - f(a)/(f(x[i]) - f(a))*(x[i] - a)
        i ← i + 1
        break if |x[i - 1] - x[i]| < e
    x[i]
    = 0.854159
