# Задание 1
y1(x) := 3*x - 1
f(x) := 3*x - cos(x) - 1
y2(x) := cos(x)
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f1 := sin(0.5) + 3
f1 = 3.47943
x[0] := 0.5
e := 0.01
i := 0
Func1 :=
    while 1 ≠ 2
        x[i + 1] ← x[i] - f(x[i])/f1
        i ← i + 1
        break if |f(x[i - 1])| < e
    x[i]
    = 0.607064
# Задание 2
f(x) := x^3 + 0.2*x^2 + 0.5*x - 1.2
f1(x) := 3*x^2 + 2*x/5 + 1/2
i := 0
x[0] := 0.5
e := 0.001
f(x[0]) = -0.775
Func2 :=
    while 1 ≠ 2
        x[i + 1] ← x[i] - f(x[i])/f1(x[i])
        i ← i + 1
        break if |f(x[i - 1])| < e
    x[i]
    = 0.855418
