f(x) := 2*x^3 + 9*x^2 - 21
f1(x) := 6*x^2 + 18*x
f11(x) := 12*x + 18
e := 0.001
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xn[0] := -4
x1n[0] := -3
i := 0
Func1 :=
    while 1 ≠ 2
        xn[i + 1] ← xn[i] - f(xn[i])/f1(xn[i])
        x1n[i + 1] ← x1n[i] - f(xn[i])/(f1(x1n[i]) - f(xn[i]))*(x1n[i] - xn[i])
        i ← i + 1
        break if |f(xn[i])| < e
    xn[i]
Func1 = -3.75553
xn[0] := -2.5
x1n[0] := -2
i := 0
Func2 :=
    while 1 ≠ 2
        xn[i + 1] ← xn[i] - f(xn[i])/f1(xn[i])
        x1n[i + 1] ← x1n[i] - f(xn[i])/(f1(x1n[i]) - f(xn[i]))*(x1n[i] - xn[i])
        i ← i + 1
        break if |f(xn[i])| < e
    xn[i]
Func2 = -2.08525
xn[0] := 1
x1n[0] := 2
i := 0
Func3 :=
    while 1 ≠ 2
        xn[i + 1] ← xn[i] - f(xn[i])/(f1(x1n[i]) - f(xn[i]))*(x1n[i] - xn[i])
        x1n[i + 1] ← x1n[i] - f(x1n[i])/f11(xn[i])
        i ← i + 1
        break if |f(xn[i])| < e
    xn[i]
    = 1.34076
Func3 = 1.34076
