# Задание 1
y1(x) := ln(x)
y2(x) := 2 - x
f(x) := ln(x) - (2 - x)
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x[0] := 0.5
e := 0.001
k := 2
i := 0
Func1 :=
    while 1 ≠ 2
        x[i + 1] ← x[i] - f(x[i])/k
        i ← i + 1
        break if |f(x[i])| < e
    x[i]
    = 1.55738
# Задание 2
f2(x) := x^3 - 0.2*x^2 + 0.4*x - 1.4
x[0] := 1
e := 0.001
k := 3
i := 0
Func2 :=
    while 1 ≠ 2
        x[i + 1] ← x[i] - f2(x[i])/k
        i ← i + 1
        break if |f2(x[i])| < e
    x[i]
    = 1.06295
