# Задание 1
f(x, y) := [sin(x - 1) + y - 1.3; -sin(y + 1) + x - 0.8]
x[0] := 1.75
y[0] := 0.55
e := 0.001
i := 0
Func1 :=
    while 1 ≠ 2
        y[i + 1] ← 1.3 - sin(x[i] - 1)
        x[i + 1] ← 0.8 + sin(y[i] + 1)
        i ← i + 1
        if |x[i] - x[i - 1]| ≤ e
            break if |y[i] - y[i - 1]| ≤ e
    return augment(x[i], y[i])
Func1 = [1.79993, 0.582755]
# Задание 2
f(x, y) := tan(x*y) - x^2
f1x(x, y) := y*(tan(x*y)^2 + 1) - 2*x
g1x(x, y) := 1.6*x
x2[0] := 0
y2[0] := -0.7
g1y(x, y) := 4*y
f1y(x, y) := x*(tan(x*y)^2 + 1)
g(x, y) := 0.8*x^2 + 2*y^2 - 1
Func2 :=
    while 1 ≠ 2
        h[i] ← (f1y(x2[i], y2[i])*g(x2[i], y2[i]) - f(x2[i], y2[i])*g1y(x2[i], y2[i]))/(f1x(x2[i], y2[i])*g1y(x2[i], y2[i]) - f1y(x2[i], y2[i])*g1x(x2[i], y2[i]))
        k[i] ← (f(x2[i], y2[i])*g1x(x2[i], y2[i]) - f1x(x2[i], y2[i])*g(x2[i], y2[i]))/(f1x(x2[i], y2[i])*g1y(x2[i], y2[i]) - f1y(x2[i], y2[i])*g1x(x2[i], y2[i]))
        x2[i + 1] ← x2[i] + h[i]
        y2[i + 1] ← y2[i] + k[i]
        i ← i + 1
        if |x2[i] - x2[i - 1]| < e
            break if |y2[i] - y2[i - 1]| < e
    return augment(x2, y2)
Func2 = [0, -0.7; 0, -0.707143; 0, -0.707107]
