x[0] := 0.43
y[0] := 1.63597
X := 0.512
x[1] := 0.48
y[1] := 1.73234
n := 5
x[2] := 0.55
y[2] := 1.87686
sum := 0
x[3] := 0.62
y[3] := 2.03345  # задание 1
x[4] := 0.70
y[4] := 2.22846  # Вычислить значение функции при x = 0.512
x[5] := 0.75
y[5] := 2.35973
f1 :=
    for i ∈ 0 .. n
        D ← y[i]
        for j ∈ 0 .. n
            D ← D*((X - x[j])/(x[i] - x[j])) if j ≠ i
            j ← j + 1
        sum ← sum + D
        i ← i + 1
    sum
f1 = 1.79697
x[0] := 1.375
y[0] := 5.04192
X := 1.3926
x[1] := 1.380
y[1] := 5.17744
n := 5
x[2] := 1.385
y[2] := 5.32016
# задание 2
x[3] := 1.390
y[3] := 5.47069
# Определить значение функции при x=1.3926
x[4] := 1.395
y[4] := 5.62968
x[5] := 1.400
y[5] := 5.79788
h := x[1] - x[0] = 0.005
t := (X - x[0])/h = 3.52
P := 1
f2 :=
    for i ∈ 0 .. n
        P ← P*(t - i)
        C[i] ← (-1)^(n - i)*i!*(n - i)!
        sum ← sum + y[i]/((t - i)*C[i])
        i ← i + 1
    sum ← P*sum
    sum
f2 = 5.55226
# задание 2. В равноотстоящих узлах таблицы
проверка
x := [0.180; 0.185; 0.190; 0.195; 0.200; 0.205]
y := [5.61543; 5.46693; 5.32634; 5.19304; 5.06649; 4.94619]
X := 1.3926
n := 5
i := 0 .. n
# Шаг интерполяции
h := x[2] - x[1] = 0.005
C[i] := (-1)^(n - i)*i!*(n - i)!
# Вычисление значений для составляющих функции f(x)
x := [1.375; 1.380; 1.385; 1.390; 1.395; 1.400]
y := [5.04192; 5.17744; 5.32016; 5.47069; 5.62968; 5.79788]
t := [(X - x[0])/h; (X - x[1])/h; (X - x[2])/h; (X - x[3])/h; (X - x[4])/h; (X - x[5])/h] = [3.52; 2.52; 1.52; 0.52; -0.48; -1.48]
C = [-120; 24; -12; 12; -24; 120]
t[i]*C[i] = [-422.4; 60.48; -18.24; 6.24; 11.52; -177.6]
y[i]/(t[i]*C[i]) = [-0.0119364; 0.0856058; -0.291675; 0.876713; 0.488688; -0.0326457]
# Составляющие функции f(x)
mult := product(t[i], i) = 4.98073
sum := sum(y[i]/(t[i]*C[i]), i = 0 .. 5) = 1.11475
# Приближенное значение в точке x=0.1875
f(x) := mult*sum
f(0.1875) = 5.55226
