# Работа 2.Схема Эйткина
# Вариант 10
x := 0.2063
i := 0 .. 9
X := [0.2050; 0.2052; 0.2060; 0.2065; 0.2069; 0.2075; 0.2085; 0.2090; 0.2096; 0.2100]
y := [0.207921; 0.208130; 0.208964; 0.209486; 0.209904; 0.210530; 0.211575; 0.212097; 0.212724; 0.213142]
X[i] - x = [-0.0013; -0.0011; -0.0003; 0.0002; 0.0006; 0.0012; 0.0022; 0.0027; 0.0033; 0.0037]
# Интерполяционный многочлен 5 степени
i := 0 .. 5
F1[i] := det([y[i], X[i] - x; y[i + 1], X[i + 1] - x])/(X[i + 1] - X[i])
F1 → [0.2092795; 0.20927675; 0.2092772; 0.209277; 0.209278; 0.209276]
# Интерполяционный многочлен 4 степени
j := 0 .. 4
F2[j] := det([F1[j], X[j] - x; F1[j + 1], X[j + 2] - x])/(X[j + 2] - X[j])
F2 → [0.209275925; 0.209277130769; 0.209277133333; 0.2092768; 0.20927875]
# Интерполяционный многочлен 3 степени
k := 0 .. 3
F3[k] := det([F2[k], X[k] - x; F2[k + 1], X[k + 3] - x])/(X[k + 3] - X[k])
F3 → [0.20927697; 0.209277132428; 0.209277066667; 0.209276605]
# Интерполяционный многочлен 2 степени
l := 0 .. 2
F4[l] := det([F3[l], X[l] - x; F3[l + 1], X[l + 4] - x])/(X[l + 4] - X[l])
F4 → [0.209277081135; 0.209277100977; 0.209277011267]
# Решение в точке x=0.2063
# f(0.2063) = 0.209277
