x[0] := 1.340
x[1] := 1.345
h := x[1] - x[0]
n := 11
i := 2 .. n
x[i] := x[0] + i*h
y[0] := 4.22562
y[1] := 4.35325
y[2] := 4.45522
y[3] := 4.56184
y[4] := 4.67344
y[5] := 4.79038
y[6] := 4.91306
y[7] := 5.04192
y[8] := 5.17744
y[9] := 5.32016
y[10] := 5.47069
y[11] := 5.62968
X[1] := 1.3617
X[2] := 1.3921
X[3] := 1.3359
X[4] := 1.400
Fun :=
    for i ∈ 0 .. n - 1
        dy[i] ← y[i + 1] - y[i]
    for i ∈ 0 .. n - 2
        ddy[i] ← dy[i + 1] - dy[i]
    for i ∈ 0 .. n - 3
        dddy[i] ← ddy[i + 1] - ddy[i]
    for j ∈ 1 .. 4
        if X[j] < x[(n + mod(n, 2))/2]
            f(q, i) ← y[i] + q*dy[i] + q*(q - 1)/2!*ddy[i] + q*(q - 1)*(q - 2)/3!*dddy[i]
            i ← 0 if X[j] < x[0]
            otherwise
                for k ∈ n .. 0
                    k ← k - 1 if x[k] > X[j]
                    i ← k otherwise
            q[j] ← (X[j] - x[i])/h
            Y[j - 1] ← f(q[j], i)
        otherwise
            f(q, n) ← y[n] + q*dy[n - 1] + q*(q + 1)/2!*ddy[n - 2] + q*(q + 1)*(q + 2)/3!*dddy[n - 3]
            i ← n if X[j] > x[n]
            otherwise
                for k ∈ 0 .. n
                    k ← k + 1 if x[k] < X[j]
                    i ← k otherwise
            q[j] ← (X[j] - x[i])/h
            Y[j - 1] ← f(q[j], i)
    return augment(Y)
Fun = [4.76491; 5.5364; 4.08056; 5.79778]
