# Работа 4.Линейная и квадратичная интерполяция
# Задание 1. Линейная интерполяция
# Вариант 7
i := 0 .. 5  # a). sin 0.6235
j := 0 .. 4
k := 0 .. 3  # б). cos 0.9464
# a).
# По таблице Брадиса выписываем ближайшие значения тангенсов
x := 0.6235
X := [0.60; 0.61; 0.62; 0.63; 0.64; 0.65]
y := [0.5646; 0.5728; 0.5810; 0.5891; 0.5971; 0.6051]
checkX[i] := X[i] - x
dyi[j] := y[j + 1] - y[j]  # Проверка на условие выполнимости
ddyi[k] := dyi[k + 1] - dyi[k]
dyi → [0.0082; 0.0082; 0.0081; 0.008; 0.008]
Checkddyi[k] := |ddyi[k]|
ddyi → [0.0; -0.0001; -0.0001; 0.0]
max(Checkddyi) → 0.0001  # Условие применимости выполняется
1/8*max(Checkddyi) → 0.0000125  # < 10^-4
# Ближайшее меньшее значение
x0 :=
    i ← 0
    while checkX[i] < 0
        x0 ← X[i]
        i ← i + 1
    x0
ix0 :=
    i ← 0
    while checkX[i] < 0
        i ← i + 1
    i - 1
x0 → 0.62
ix0 = 2
# Множитель для приближения в функции f(x)
q := (x - x0)/(X[2] - X[1])
q = 0.35
# Значение sin 0.6235
f(x) := y[ix0] + q*dyi[ix0] → 0.583835
# б).
x := 0.9464
X := [0.92; 0.93; 0.94; 0.95; 0.96; 0.97]
y := [-0.0348; -0.0523; -0.0697; -0.0871; -0.1045; -0.1218]
checkX[i] := X[i] - x
dyi[j] := y[j + 1] - y[j]  # Проверка на условие выполнимости
ddyi[k] := dyi[k + 1] - dyi[k]
dyi → [-0.0175; -0.0174; -0.0174; -0.0174; -0.0173]
Checkddyi[k] := |ddyi[k]|
ddyi → [0.0001; 0.0; 0.0; 0.0001]
max(Checkddyi) → 0.0001  # Условие применимости выполняется
1/8*max(Checkddyi) → 0.0000125  # < 10^-4
# Ближайшее меньшее значение
x0 :=
    i ← 0
    while checkX[i] < 0
        x0 ← X[i]
        i ← i + 1
    x0
ix0 :=
    i ← 0
    while checkX[i] < 0
        i ← i + 1
    i - 1
# Индекс ближайшего меньшего значения
x0 → 0.94
ix0 = 2
# Множитель для приближения в функции f(x)
q := (x - x0)/(X[2] - X[1])
q = 0.64
# Значение cos 0.9464
f(x) := y[ix0] + q*dyi[ix0] → -0.080836
# Задание 2. Квадратичная интерполяция
i := 0 .. 5
m := 0 .. 2
j := 0 .. 4
k := 0 .. 3
# Ближайшие значения из таблицы 1
x1 := 1.6822
x2 := 1.6808
X := [1.680; 1.681; 1.682; 1.683; 1.684; 1.685]
y := [9.1208; 9.0373; 8.9554; 8.8749; 8.7959; 8.7182]
checkX(x) := X - x
# Проверка условия применимости
dyi[j] := y[j + 1] - y[j]
checkX(x1) = [-0.0022; -0.0012; -0.0002; 0.0008; 0.0018; 0.0028]
checkX(x2) = [-0.0008; 0.0002; 0.0012; 0.0022; 0.0032; 0.0042]
dyi → [-0.0835; -0.0819; -0.0805; -0.079; -0.0777]
ddyi[k] := dyi[k + 1] - dyi[k]
ddyi → [0.0016; 0.0014; 0.0015; 0.0013]
dddyi[m] := ddyi[m + 1] - ddyi[m]
dddyi → [-0.0002; 0.0001; -0.0002]
checkdddyi[m] := |dddyi[m]|
max(checkdddyi) → 0.0002
# Условие выполняется
max(checkdddyi) → 0.0002  # < 10^-3
# Ближайшее значение по x для x1
x0(x) :=
    i ← 0
    while checkX(x)[i] < 0
        a ← X[i]
        i ← i + 1
    a
ix0(x) :=
    i ← 0
    while checkX(x)[i] < 0
        i ← i + 1
    i - 1
# Индекс элемента x
x0(x1) → 1.682
ix0(x1) = 2
# Ближайшее значение по x для x2
x0(x) :=
    i ← 0
    while checkX(x)[i] < 0
        a ← X[i]
        i ← i + 1
    a
ix0(x) :=
    i ← 0
    while checkX(x)[i] < 0
        i ← i + 1
    i - 1
# Индекс элемента x
x0(x2) → 1.68
ix0(x2) = 0
# Множитель для приближения в функции f(x)
q(x) := (x - x0(x))/(X[2] - X[1])
q(x) = 946.4
# Формула для нахождения значения x
f(x) := y[ix0(x)] + q(x)*dyi[ix0(x)] + q(x)*(q(x) - 1)/2*ddyi[ix0(x)]
# Значения x1 и x2
f(x1) → 8.93918
f(x2) → 9.053872
