# Работа 5. Интерполяционные формулы Гаусса, Стирлинга и Бесселя
n := 7
X[1] := 1.6 + 0.006*n = 1.642
X[2] := 1.725 + 0.002*n = 1.739
X[3] := 1.83 + 0.003*n = 1.851
X[4] := 2 - 0.013*n = 1.909
# Таблица функции y(x)
x := [1.5; 1.55; 1.6; 1.65; 1.7; 1.75; 1.8; 1.85; 1.9; 1.95; 2; 2.05; 2.1]
y := [15.132; 17.422; 20.393; 23.994; 28.16; 32.812; 37.857; 43.189; 48.689; 54.225; 59.653; 64.817; 69.550]
n := length(x) = 13  # Подсчёт центральных разностей функции
i := 0 .. n - 2
dy[i] := y[i + 1] - y[i]
i := 0 .. n - 3
h := x[2] - x[1] = 0.05
ddy[i] := dy[i + 1] - dy[i]
i := 0 .. n - 4
dddy[i] := ddy[i + 1] - ddy[i]
i := 0 .. n - 5
ddddy[i] := dddy[i + 1] - dddy[i]
# Таблица конечных разностей
x = [1.5; 1.55; 1.6; 1.65; 1.7; 1.75; 1.8; 1.85; 1.9; 1.95; 2; 2.05; 2.1]
y = [15.132; 17.422; 20.393; 23.994; 28.16; 32.812; 37.857; 43.189; 48.689; 54.225; 59.653; 64.817; 69.55]
dy = [2.29; 2.971; 3.601; 4.166; 4.652; 5.045; 5.332; 5.5; 5.536; 5.428; 5.164; 4.733]
ddy = [0.681; 0.63; 0.565; 0.486; 0.393; 0.287; 0.168; 0.036; -0.108; -0.264; -0.431]
dddy = [-0.051; -0.065; -0.079; -0.093; -0.106; -0.119; -0.132; -0.144; -0.156; -0.167]
ddddy = [-0.014; -0.014; -0.014; -0.013; -0.013; -0.013; -0.012; -0.012; -0.011]
# Задание 1. Первая формула Гаусса
X[1] = 1.642  # Нахождение x0
a :=
    for i ∈ 0 .. n - 1
        if (X[1] - x[i]) < 0
            a ← i - 1
            break
        a ← i + 1 otherwise
x[a] = 1.6
# Число шагов
t := (X[1] - x[a])/h = 0.84
# Результат функции при x=1.642
GaussFirst := y[a] + t*dy[a] + ddy[a - 1]*(t*(t - 1))/2! + dddy[a - 1]*(t*(t + 1)*(t - 1))/3! = 23.3782
# Задание 2. Формула Бесселя
# Нахождение x0
X[2] = 1.739
a :=
    for i ∈ 0 .. n - 1
        if (X[2] - x[i]) < 0
            a ← i - 1
            break
        a ← i + 1 otherwise
x[a] = 1.7
# Число шагов
t := (X[2] - x[a])/h = 0.78
# Результат функции при x=1.739
Bessel := (y[a] + y[a - 1])/2 + (t - 1/2)*dy[a] + (ddy[a - 1] + ddy[a])/2*(t*(t - 1))/2! + dddy[a - 1]*((t - 1/2)*t*(t - 1))/2! = 27.3441
# Задание 3. Формула Стирлинга
# Нахождение x0
X[3] = 1.851
a :=
    for i ∈ 0 .. n - 1
        if (X[3] - x[i]) < 0
            a ← i - 1
            break
        a ← i + 1 otherwise
x[a] = 1.85
# Число шагов
t := (X[3] - x[a])/h = 0.02
# Результат функции при x=1.851
Stirling := y[a] + t*(dy[a - 1] + dy[a])/2 + ddy[a - 1]*t^2/2 + (t*(t^2 - 1))/6*(dddy[a - 2] + ddy[a - 1])/2 = 43.2973
# Задание 4. Вторая формула Гаусса
# Нахождение x0
X[4] = 1.909
a :=
    for i ∈ 0 .. n - 1
        if (X[4] - x[i]) < 0
            a ← i
            break
        a ← i + 1 otherwise
x[a] = 1.95
# Число шагов
t := (X[3] - x[a])/h = -1.98
# Результат функции при x=1.909
GaussSecond := y[a] + t*dy[a - 1] + ddy[a - 1]*(t*(t - 1))/2! + dddy[a - 2]*(t*(t + 1)*(t - 1))/3! = 43.0839
