# Работа 6. Интерполяционная формула Ньютона для неравноотстоящих узлов
x1 := 0.314
x2 := 0.337
y := [3.25578; 3.17639; 3.12180; 3.04819; 2.98755; 2.91950; 2.83598]
X := [0.298; 0.303; 0.310; 0.317; 0.323; 0.330; 0.339]
checkX(x) := X - x
i := 0 .. (rows(X) - 2)
# Подсчёт P1 для формулы y(x)
checkX(x1) = [-0.016; -0.011; -0.004; 0.003; 0.009; 0.016; 0.025]
checkX(x2) = [-0.039; -0.034; -0.027; -0.02; -0.014; -0.007; 0.002]
P1[i] := (y[i + 1] - y[i])/(X[i + 1] - X[i])
P1 → [-15.878; -7.79857142857; -10.5157142857; -10.1066666667; -9.72142857143; -9.28]
j := 0 .. (rows(P1) - 2)
# Подсчёт P2 для формулы y(x)
P2[j] := (P1[j + 1] - P1[j])/(X[j + 2] - X[j])
P2 → [673.285714286; -194.081632653; 31.4652014652; 29.6336996337; 27.5892857143]
# Поиск левых границ
# Поиск индекса начальной границы | Поиск правых границ
x0(x) :=
    i ← 0
    while checkX(x)[i] < 0
        a ← X[i]
        i ← i + 1
    a
ix0(x) :=
    i ← 0
    b ← i
    while checkX(x)[i] < 0
        b ← i
        i ← i + 1
    b
X1(x) :=
    i ← 0
    a ← X
    while checkX(x)[i] < 0
        i ← i + 1
    a[i]
x0(x1) = 0.31
ix0(x1) = 2
X1(x1) = 0.317
x0(x2) = 0.33
ix0(x2) = 5
X1(x2) = 0.339
# Сдвиг левой границы на один шаг влево | Поиск нового индекса начальной границы | Запись прошлой левой границы в правую
X11(x) := x0(x)
x01(x) :=
    b ← "Второй способ не применим, т.к. начальный индекс был равен 0" if ix0(x) == 0
    otherwise
        i ← 0
        b ← i
        while checkX(x)[i] < 0
            b ← a
            a ← X[i]
            i ← i + 1
    b
ix01(x) :=
    b ← "Второй способ не применим, т.к. начальный индекс был равен 0" if ix0(x) == 0
    otherwise
        i ← 0
        b ← i
        while checkX(x)[i] < 0
            b ← i
            i ← i + 1
        b ← b - 1
    b
X11(x1) = 0.31
X11(x2) = 0.33
x01(x1) → 0.303
ix01(x1) = 1
x01(x2) → 0.323
ix01(x2) = 4
# Первое вычисление по интерполяционной формуле Ньютона для неравноотстоящих узлов интерполяции
f1(x) := y[ix01(x)] + P1[ix01(x)]*(x - x01(x)) + P2[ix01(x)]*(x - x01(x))*(x - X11(x))
# Результаты первого вычисления
f1(x2) → 2.85415375
f1(x1) → 3.08206612245
# Второе вычисление по интерполяционной формуле Ньютона для неравноотстоящих узлов интерполяции
f2(x) := y[ix0(x)] + P1[ix0(x) - 1]*(x - x0(x)) + P2[ix0(x) - 1]*(x - x0(x))*(x - X1(x))
# Результаты второго вычисления
f2(x2) → 2.85106375
f2(x1) → 3.09293469388
# Формула среднего значения по двум вычислениям
f(x) :=
    b ← f2(x) if ix0(x) == 0
    b ← (f1(x) + f2(x))/2 otherwise
    b
# За конечный результат принимаем следующие значения x1 и x2
f(x1) → 3.08750040816
f(x2) → 2.85260875
